    <aerodynamics>
    <fileheader>
        <author>Richard Harrison</author>
        <filecreationdate>2018-03-19</filecreationdate>
        <version>1.0</version>
        <copyright>Copyright (C) 2016 Richard Harrison, All rights reserved</copyright>
        <description></description>
        <note>
            ailerons, 25degrees either deflection Roll: fcs/roll-pos-deg
            elevator(TE UP), 30 up, 17 down (FBW limits it to 20 up 17 down after 70kts)  Pitch: fcs/pitch-pos-deg
            rudder 25degrees either way fcs/yaw-pos-deg
            spoilers 35 degrees each spoiler(edited) fcs/speedbrake-left-deg fcs/speedbrake-right-deg
            slats 0 - 27 degrees fcs/slat-pos-deg
            flaps 0 - 35 degrees fcs/flap-pos-deg
            stabilator (LE up) (elevator trim): +4.0 -12.5 fcs/pitch-trim-pos-deg
        </note>
        <note>Built with AeroTool 1.0.0.0: Options: AeroDetail=Full, MultiSampleAero, MultiSampleDerivatives, WakeIterations=4</note>
        <limitation></limitation>
        <reference
            refID="ZDAT/AED/2018/03-07"
            author="Richard Harrison, rjh@zaretto.com"
            title="A320 200 Aerodynamic data built from vspaero; CG (15.3, 0, 0)M"
            date="March 7, 2018"
            URL="http://www.zaretto.com/sites/zaretto.com/files/A320-200-data/rjh-zaretto-A320-200-aerodynamic-data-vspaero.pdf"
        />
    </fileheader>
    <function name="aero/c/CFXB">
    <description>BASE DRAG</description>
    <product>
          <table>
            <independentVar lookup="row">aero/alpha-deg</independentVar>
            <independentVar lookup="column">aero/beta-deg</independentVar>
            <tableData>
                                -20	        -10	         -5	         -2	          0	          2	          5	         10	         20
                    -10	    0.11945	    0.10787	    0.10483	    0.10408	    0.10396	    0.10408	    0.10483	    0.10787	    0.11945
                     -5	    0.10209	    0.08521	    0.07964	    0.07839	    0.07815	    0.07839	    0.07964	    0.08428	    0.10209
                     -2	    0.09954	    0.07966	    0.07430	    0.07284	    0.07256	    0.07284	    0.07430	    0.07966	    0.09954
                      0	    0.10129	    0.08064	    0.07495	    0.07341	    0.07313	    0.07341	    0.07494	    0.08064	    0.10133
                      1	    0.10339	    0.08317	    0.07653	    0.07497	    0.07469	    0.07497	    0.07653	    0.08234	    0.10339
                      2	    0.10624	    0.08566	    0.07898	    0.07736	    0.07710	    0.07736	    0.07898	    0.08485	    0.10624
                      3	    0.11005	    0.08816	    0.08227	    0.08055	    0.08036	    0.08054	    0.08227	    0.08816	    0.11005
                      4	    0.11642	    0.09259	    0.08664	    0.08451	    0.08448	    0.08451	    0.08663	    0.09263	    0.11642
                      5	    0.12881	    0.09950	    0.09236	    0.08929	    0.08941	    0.08929	    0.09235	    0.09950	    0.12881
                      6	    0.14033	    0.10815	    0.09890	    0.09540	    0.09504	    0.09541	    0.09889	    0.10815	    0.14296
                      7	    0.13882	    0.11252	    0.10500	    0.10227	    0.10134	    0.10227	    0.10499	    0.11252	    0.14145
                      8	    0.13880	    0.11711	    0.11183	    0.10924	    0.10836	    0.10924	    0.11185	    0.11867	    0.13880
                      9	    0.14310	    0.12764	    0.11979	    0.11705	    0.11636	    0.11704	    0.11979	    0.12763	    0.14310
                     10	    0.14843	    0.13416	    0.12785	    0.12572	    0.12515	    0.12572	    0.12785	    0.13416	    0.14843
                     11	    0.15407	    0.14169	    0.13636	    0.13494	    0.13453	    0.13494	    0.13636	    0.14176	    0.15407
                     12	    0.16032	    0.15074	    0.14538	    0.14415	    0.14393	    0.14421	    0.14536	    0.15074	    0.16010
                     13	    0.16694	    0.16028	    0.15456	    0.15332	    0.15310	    0.15332	    0.15453	    0.16028	    0.16719
                     14	    0.17450	    0.17009	    0.16372	    0.16237	    0.16219	    0.16237	    0.16372	    0.17009	    0.17475
                     15	    0.18261	    0.17953	    0.17282	    0.17142	    0.17121	    0.17142	    0.17282	    0.17953	    0.18261
                     16	    0.19047	    0.18867	    0.18173	    0.18019	    0.17992	    0.18019	    0.18173	    0.18876	    0.19052
                     17	    0.19865	    0.19745	    0.19060	    0.18893	    0.18855	    0.18893	    0.19060	    0.19745	    0.19870
                     18	    0.20704	    0.20542	    0.19907	    0.19707	    0.19659	    0.19707	    0.19907	    0.20542	    0.20685
                     19	    0.21451	    0.21302	    0.20658	    0.20459	    0.20395	    0.20458	    0.20658	    0.21232	    0.21431
                     20	    0.22094	    0.22066	    0.21332	    0.21159	    0.21075	    0.21159	    0.21332	    0.22066	    0.22094
                     30	    0.27426	    0.26831	    0.26649	    0.26544	    0.26540	    0.26545	    0.26651	    0.26831	    0.27426
                     60	    0.34107	    0.33786	    0.33781	    0.33698	    0.33688	    0.33698	    0.33781	    0.33786	    0.34097
            </tableData>
          </table>
       </product>
    </function>
    <function name="aero/c/CFXDADL">
    <description>DRAG INCREMENT DUE TO LEFT AILERON DEFLECTION</description>
    <product>
          <property>fcs/roll-pos-left-deg</property>
          <table>
            <independentVar lookup="row">aero/alpha-deg</independentVar>
            <independentVar lookup="column">aero/beta-deg</independentVar>
            <tableData>
                                -20	        -10	         -5	         -2	          0	          2	          5	         10	         20
                    -10	  -0.00020	  -0.00013	  -0.00013	  -0.00013	  -0.00013	  -0.00013	  -0.00013	  -0.00013	  -0.00013
                     -5	  -0.00013	  -0.00012	  -0.00015	  -0.00015	  -0.00015	  -0.00015	  -0.00014	  -0.00013	  -0.00011
                     -2	  -0.00011	  -0.00012	  -0.00013	  -0.00013	  -0.00013	  -0.00012	  -0.00012	  -0.00011	  -0.00008
                      0	  -0.00010	  -0.00011	  -0.00011	  -0.00011	  -0.00011	  -0.00010	  -0.00010	  -0.00009	  -0.00006
                      1	  -0.00009	  -0.00008	  -0.00010	  -0.00010	  -0.00010	  -0.00009	  -0.00009	  -0.00008	  -0.00005
                      2	  -0.00008	  -0.00007	  -0.00009	  -0.00009	  -0.00009	  -0.00008	  -0.00008	  -0.00007	  -0.00004
                      3	  -0.00008	  -0.00008	  -0.00008	  -0.00008	  -0.00008	  -0.00007	  -0.00007	  -0.00006	  -0.00003
                      4	  -0.00007	  -0.00008	  -0.00007	  -0.00007	  -0.00007	  -0.00007	  -0.00006	  -0.00006	  -0.00002
                      5	  -0.00006	  -0.00007	  -0.00006	  -0.00006	  -0.00006	  -0.00006	  -0.00005	  -0.00003	   0.00000
                      6	  -0.00006	  -0.00006	  -0.00005	  -0.00005	  -0.00005	  -0.00005	  -0.00004	  -0.00002	    0.00010
                      7	  -0.00005	  -0.00005	  -0.00006	  -0.00004	  -0.00004	  -0.00004	  -0.00003	  -0.00001	    0.00010
                      8	  -0.00004	  -0.00009	  -0.00004	  -0.00003	  -0.00003	  -0.00002	  -0.00001	   0.00000	    0.00002
                      9	  -0.00012	  -0.00003	  -0.00002	  -0.00002	  -0.00002	  -0.00001	   0.00000	    0.00001	    0.00001
                     10	  -0.00011	  -0.00002	  -0.00001	  -0.00001	   0.00000	    0.00000	    0.00001	    0.00001	   0.00000
                     11	  -0.00002	  -0.00002	   0.00000	    0.00000	    0.00001	    0.00001	    0.00001	    0.00002	  -0.00001
                     12	  -0.00011	  -0.00004	    0.00001	    0.00001	    0.00001	    0.00001	    0.00001	    0.00002	  -0.00001
                     13	  -0.00011	  -0.00002	    0.00001	    0.00001	    0.00001	    0.00001	    0.00002	    0.00002	  -0.00001
                     14	  -0.00001	    0.00002	    0.00001	    0.00001	    0.00001	    0.00002	    0.00002	    0.00003	   0.00000
                     15	    0.00001	    0.00001	    0.00001	    0.00002	    0.00002	    0.00002	    0.00002	    0.00003	   0.00000
                     16	    0.00002	    0.00002	    0.00002	    0.00002	    0.00002	    0.00003	    0.00003	    0.00004	    0.00000
                     17	  -0.00002	    0.00002	    0.00002	    0.00002	    0.00003	    0.00003	    0.00003	    0.00004	    0.00000
                     18	    0.00004	    0.00002	    0.00002	    0.00003	    0.00003	    0.00003	    0.00003	    0.00004	    0.00001
                     19	    0.00004	    0.00002	    0.00003	    0.00003	    0.00003	    0.00003	    0.00004	    0.00000	    0.00001
                     20	    0.00003	    0.00002	    0.00003	    0.00003	    0.00003	    0.00003	    0.00004	    0.00004	    0.00001
                     30	  -0.00005	    0.00002	    0.00002	    0.00002	    0.00002	    0.00002	    0.00002	    0.00003	    0.00004
                     60	    0.00001	    0.00001	    0.00002	    0.00002	    0.00002	    0.00002	    0.00002	    0.00003	    0.00004
            </tableData>
          </table>
       </product>
    </function>
    <function name="aero/c/CFXDADR">
    <description>DRAG INCREMENT DUE TO RIGHT AILERON DEFLECTION</description>
    <product>
          <property>fcs/roll-pos-right-deg</property>
          <table>
            <independentVar lookup="row">aero/alpha-deg</independentVar>
            <independentVar lookup="column">aero/beta-deg</independentVar>
            <tableData>
                                -20	        -10	         -5	         -2	          0	          2	          5	         10	         20
                    -10	  -0.00020	  -0.00013	  -0.00013	  -0.00013	  -0.00013	  -0.00013	  -0.00013	  -0.00013	  -0.00013
                     -5	  -0.00013	  -0.00012	  -0.00015	  -0.00015	  -0.00015	  -0.00015	  -0.00014	  -0.00013	  -0.00011
                     -2	  -0.00011	  -0.00012	  -0.00013	  -0.00013	  -0.00013	  -0.00012	  -0.00012	  -0.00011	  -0.00008
                      0	  -0.00010	  -0.00011	  -0.00011	  -0.00011	  -0.00011	  -0.00010	  -0.00010	  -0.00009	  -0.00006
                      1	  -0.00009	  -0.00008	  -0.00010	  -0.00010	  -0.00010	  -0.00009	  -0.00009	  -0.00008	  -0.00005
                      2	  -0.00008	  -0.00007	  -0.00009	  -0.00009	  -0.00009	  -0.00008	  -0.00008	  -0.00007	  -0.00004
                      3	  -0.00008	  -0.00008	  -0.00008	  -0.00008	  -0.00008	  -0.00007	  -0.00007	  -0.00006	  -0.00003
                      4	  -0.00007	  -0.00008	  -0.00007	  -0.00007	  -0.00007	  -0.00007	  -0.00006	  -0.00006	  -0.00002
                      5	  -0.00006	  -0.00007	  -0.00006	  -0.00006	  -0.00006	  -0.00006	  -0.00005	  -0.00003	   0.00000
                      6	  -0.00006	  -0.00006	  -0.00005	  -0.00005	  -0.00005	  -0.00005	  -0.00004	  -0.00002	    0.00010
                      7	  -0.00005	  -0.00005	  -0.00006	  -0.00004	  -0.00004	  -0.00004	  -0.00003	  -0.00001	    0.00010
                      8	  -0.00004	  -0.00009	  -0.00004	  -0.00003	  -0.00003	  -0.00002	  -0.00001	   0.00000	    0.00002
                      9	  -0.00012	  -0.00003	  -0.00002	  -0.00002	  -0.00002	  -0.00001	   0.00000	    0.00001	    0.00001
                     10	  -0.00011	  -0.00002	  -0.00001	  -0.00001	   0.00000	    0.00000	    0.00001	    0.00001	   0.00000
                     11	  -0.00002	  -0.00002	   0.00000	    0.00000	    0.00001	    0.00001	    0.00001	    0.00002	  -0.00001
                     12	  -0.00011	  -0.00004	    0.00001	    0.00001	    0.00001	    0.00001	    0.00001	    0.00002	  -0.00001
                     13	  -0.00011	  -0.00002	    0.00001	    0.00001	    0.00001	    0.00001	    0.00002	    0.00002	  -0.00001
                     14	  -0.00001	    0.00002	    0.00001	    0.00001	    0.00001	    0.00002	    0.00002	    0.00003	   0.00000
                     15	    0.00001	    0.00001	    0.00001	    0.00002	    0.00002	    0.00002	    0.00002	    0.00003	   0.00000
                     16	    0.00002	    0.00002	    0.00002	    0.00002	    0.00002	    0.00003	    0.00003	    0.00004	    0.00000
                     17	  -0.00002	    0.00002	    0.00002	    0.00002	    0.00003	    0.00003	    0.00003	    0.00004	    0.00000
                     18	    0.00004	    0.00002	    0.00002	    0.00003	    0.00003	    0.00003	    0.00003	    0.00004	    0.00001
                     19	    0.00004	    0.00002	    0.00003	    0.00003	    0.00003	    0.00003	    0.00004	    0.00000	    0.00001
                     20	    0.00003	    0.00002	    0.00003	    0.00003	    0.00003	    0.00003	    0.00004	    0.00004	    0.00001
                     30	  -0.00005	    0.00002	    0.00002	    0.00002	    0.00002	    0.00002	    0.00002	    0.00003	    0.00004
                     60	    0.00001	    0.00001	    0.00002	    0.00002	    0.00002	    0.00002	    0.00002	    0.00003	    0.00004
            </tableData>
          </table>
       </product>
    </function>
    <function name="aero/c/CFXDFM">
    <description>DRAG INCREMENT DUE TO FLAPS</description>
    <product>
          <property>fcs/flap-pos-deg</property>
          <table>
            <independentVar lookup="row">aero/alpha-deg</independentVar>
            <tableData>
                    -10		  -0.00043
                     -5		    0.00016
                     -2		    0.00054
                      0		    0.00081
                      1		    0.00094
                      2		    0.00109
                      3		    0.00123
                      4		    0.00138
                      5		    0.00151
                      6		    0.00160
                      7		    0.00168
                      8		    0.00173
                      9		    0.00175
                     10		    0.00175
                     11		    0.00172
                     12		    0.00167
                     13		    0.00163
                     14		    0.00158
                     15		    0.00154
                     16		    0.00150
                     17		    0.00147
                     18		    0.00145
                     19		    0.00145
                     20		    0.00146
                     30		    0.00190
                     60		    0.00192
            </tableData>
          </table>
       </product>
    </function>
    <function name="aero/c/CFXDRD">
    <description>DRAG INCREMENT DUE TO RUDDER DEFLECTION</description>
    <product>
          <property>fcs/yaw-pos-deg</property>
          <table>
            <independentVar lookup="row">aero/alpha-deg</independentVar>
            <independentVar lookup="column">aero/beta-deg</independentVar>
            <tableData>
                                -20	        -10	         -5	         -2	          0	          2	          5	         10	         20
                    -10	  -0.00059	  -0.00072	  -0.00059	  -0.00048	  -0.00038	  -0.00032	  -0.00018	    0.00006	    0.00052
                     -5	  -0.00067	  -0.00068	  -0.00056	  -0.00045	  -0.00034	  -0.00027	  -0.00013	    0.00010	    0.00054
                     -2	  -0.00067	  -0.00069	  -0.00053	  -0.00041	  -0.00032	  -0.00024	  -0.00011	    0.00012	    0.00055
                      0	  -0.00068	  -0.00069	  -0.00051	  -0.00038	  -0.00029	  -0.00022	  -0.00009	    0.00013	    0.00057
                      1	  -0.00068	  -0.00066	  -0.00050	  -0.00037	  -0.00028	  -0.00021	  -0.00008	    0.00014	    0.00058
                      2	  -0.00068	  -0.00066	  -0.00049	  -0.00036	  -0.00027	  -0.00020	  -0.00008	    0.00015	    0.00059
                      3	  -0.00069	  -0.00069	  -0.00049	  -0.00034	  -0.00026	  -0.00019	  -0.00007	    0.00016	    0.00060
                      4	  -0.00071	  -0.00069	  -0.00049	  -0.00034	  -0.00026	  -0.00019	  -0.00006	    0.00017	    0.00063
                      5	  -0.00077	  -0.00073	  -0.00050	  -0.00039	  -0.00025	  -0.00020	  -0.00003	    0.00021	    0.00073
                      6	  -0.00083	  -0.00077	  -0.00052	  -0.00036	  -0.00023	  -0.00017	    0.00002	    0.00027	    0.00090
                      7	  -0.00078	  -0.00073	  -0.00052	  -0.00038	  -0.00023	  -0.00011	    0.00003	    0.00026	    0.00081
                      8	  -0.00072	  -0.00082	  -0.00055	  -0.00035	  -0.00024	  -0.00013	    0.00007	    0.00031	    0.00066
                      9	  -0.00070	  -0.00085	  -0.00057	  -0.00036	  -0.00023	  -0.00011	    0.00011	    0.00041	    0.00063
                     10	  -0.00069	  -0.00075	  -0.00052	  -0.00038	  -0.00023	  -0.00008	    0.00006	    0.00032	    0.00062
                     11	  -0.00068	  -0.00070	  -0.00048	  -0.00036	  -0.00022	  -0.00010	    0.00002	    0.00026	    0.00061
                     12	  -0.00068	  -0.00069	  -0.00046	  -0.00033	  -0.00022	  -0.00013	    0.00001	    0.00027	    0.00059
                     13	  -0.00068	  -0.00069	  -0.00045	  -0.00030	  -0.00022	  -0.00014	    0.00002	    0.00029	    0.00060
                     14	  -0.00069	  -0.00069	  -0.00044	  -0.00030	  -0.00022	  -0.00012	    0.00003	    0.00031	    0.00063
                     15	  -0.00069	  -0.00069	  -0.00043	  -0.00030	  -0.00020	  -0.00010	    0.00004	    0.00033	    0.00065
                     16	  -0.00059	  -0.00069	  -0.00043	  -0.00029	  -0.00019	  -0.00008	    0.00007	    0.00036	    0.00064
                     17	  -0.00059	  -0.00070	  -0.00044	  -0.00030	  -0.00017	  -0.00004	    0.00011	    0.00039	    0.00065
                     18	  -0.00069	  -0.00071	  -0.00047	  -0.00030	  -0.00014	    0.00000	    0.00016	    0.00042	    0.00066
                     19	  -0.00069	  -0.00070	  -0.00047	  -0.00031	  -0.00013	    0.00003	    0.00017	    0.00041	    0.00066
                     20	  -0.00069	  -0.00071	  -0.00042	  -0.00034	  -0.00015	    0.00005	    0.00014	    0.00047	    0.00066
                     30	  -0.00055	  -0.00037	  -0.00034	  -0.00014	  -0.00011	  -0.00006	    0.00014	    0.00023	    0.00052
                     60	  -0.00001	  -0.00002	  -0.00001	  -0.00001	   0.00000	    0.00001	    0.00003	    0.00004	    0.00009
            </tableData>
          </table>
       </product>
    </function>
    <function name="aero/c/CFXDSM">
    <description>DRAG INCREMENT DUE TO SLATS</description>
    <product>
          <property>fcs/slat-pos-deg</property>
          <table>
            <independentVar lookup="row">aero/alpha-deg</independentVar>
            <tableData>
                    -10		  -0.00050
                     -5		    0.00003
                     -2		    0.00039
                      0		    0.00066
                      1		    0.00080
                      2		    0.00095
                      3		    0.00110
                      4		    0.00126
                      5		    0.00141
                      6		    0.00156
                      7		    0.00171
                      8		    0.00181
                      9		    0.00187
                     10		    0.00190
                     11		    0.00190
                     12		    0.00189
                     13		    0.00186
                     14		    0.00180
                     15		    0.00175
                     16		    0.00170
                     17		    0.00166
                     18		    0.00164
                     19		    0.00164
                     20		    0.00166
                     30		    0.00214
                     60		    0.00214
            </tableData>
          </table>
       </product>
    </function>
    <function name="aero/c/CFXDSPL">
    <description>DRAG INCREMENT DUE TO SPOILERS LEFT</description>
    <product>
          <table>
            <independentVar lookup="row">aero/alpha-deg</independentVar>
            <independentVar lookup="column">fcs/speedbrake-left-deg</independentVar>
            <tableData>
                                  0	         20	         50
                    -10	    0.00000	    0.01439	    0.02158
                     -5	    0.00000	    0.01283	    0.02349
                     -2	    0.00000	    0.00893	    0.02210
                      0	    0.00000	    0.00644	    0.02028
                      1	    0.00000	    0.00521	    0.01884
                      2	    0.00000	    0.00401	    0.01694
                      3	    0.00000	    0.00279	    0.01484
                      4	    0.00000	    0.00157	    0.01265
                      5	    0.00000	    0.00030	    0.01042
                      6	    0.00000	  -0.00104	    0.00829
                      7	    0.00000	  -0.00235	    0.00660
                      8	    0.00000	  -0.00352	    0.00498
                      9	    0.00000	  -0.00472	    0.00319
                     10	    0.00000	  -0.00600	    0.00118
                     11	    0.00000	  -0.00735	  -0.00080
                     12	    0.00000	  -0.00841	  -0.00254
                     13	    0.00000	  -0.00914	  -0.00411
                     14	    0.00000	  -0.00966	  -0.00551
                     15	    0.00000	  -0.00984	  -0.00659
                     16	    0.00000	  -0.00956	  -0.00716
                     17	    0.00000	  -0.00911	  -0.00761
                     18	    0.00000	  -0.00834	  -0.00741
                     19	    0.00000	  -0.00749	  -0.00700
                     20	    0.00000	  -0.00688	  -0.00668
                     30	    0.00000	  -0.00810	  -0.01193
                     60	    0.00000	  -0.00659	  -0.01075
            </tableData>
          </table>
       </product>
    </function>
    <function name="aero/c/CFXDSPR">
    <description>DRAG INCREMENT DUE TO SPOILERS RIGHT</description>
    <product>
          <table>
            <independentVar lookup="row">aero/alpha-deg</independentVar>
            <independentVar lookup="column">fcs/speedbrake-right-deg</independentVar>
            <tableData>
                                  0	         20	         50
                    -10	    0.00000	    0.01439	    0.02158
                     -5	    0.00000	    0.01283	    0.02349
                     -2	    0.00000	    0.00893	    0.02210
                      0	    0.00000	    0.00644	    0.02028
                      1	    0.00000	    0.00521	    0.01884
                      2	    0.00000	    0.00401	    0.01694
                      3	    0.00000	    0.00279	    0.01484
                      4	    0.00000	    0.00157	    0.01265
                      5	    0.00000	    0.00030	    0.01042
                      6	    0.00000	  -0.00104	    0.00829
                      7	    0.00000	  -0.00235	    0.00660
                      8	    0.00000	  -0.00352	    0.00498
                      9	    0.00000	  -0.00472	    0.00319
                     10	    0.00000	  -0.00600	    0.00118
                     11	    0.00000	  -0.00735	  -0.00080
                     12	    0.00000	  -0.00841	  -0.00254
                     13	    0.00000	  -0.00914	  -0.00411
                     14	    0.00000	  -0.00966	  -0.00551
                     15	    0.00000	  -0.00984	  -0.00659
                     16	    0.00000	  -0.00956	  -0.00716
                     17	    0.00000	  -0.00911	  -0.00761
                     18	    0.00000	  -0.00834	  -0.00741
                     19	    0.00000	  -0.00749	  -0.00700
                     20	    0.00000	  -0.00688	  -0.00668
                     30	    0.00000	  -0.00810	  -0.01193
                     60	    0.00000	  -0.00659	  -0.01075
            </tableData>
          </table>
       </product>
    </function>
    <function name="aero/c/CFXGEAR">
    <description>DRAG INCREMENT DUE TO GEAR</description>
    <product>
          <property>gear/gear-pos-norm</property>
          <table>
            <independentVar lookup="row">aero/alpha-deg</independentVar>
            <tableData>
                    -10		    0.00104
                     -5		    0.00072
                     -2		    0.00066
                      0		    0.00064
                      1		    0.00064
                      2		    0.00065
                      3		    0.00066
                      4		    0.00068
                      5		    0.00070
                      6		    0.00074
                      7		    0.00081
                      8		    0.00086
                      9		    0.00047
                     10		    0.00071
                     11		    0.00065
                     12		    0.00101
                     13		    0.00112
                     14		    0.00081
                     15		    0.00076
                     16		    0.00048
                     17		  -0.00173
                     18		  -0.00321
                     19		  -0.00469
                     20		  -0.00272
                     30		    0.00314
                     60		    0.00827
            </tableData>
          </table>
       </product>
    </function>
    <function name="aero/c/CFZB">
    <description>BASE LIFT</description>
    <product>
          <table>
            <independentVar lookup="row">aero/alpha-deg</independentVar>
            <independentVar lookup="column">fcs/pitch-pos-deg</independentVar>
            <tableData>
                                -17	        -15	        -10	         -5	          0	          5	         10	         15	         20	         25	         30
                    -10	  -0.99955	  -0.98830	  -0.94234	  -0.89200	  -0.84102	  -0.79102	  -0.74263	  -0.69684	  -0.65477	  -0.61749	  -0.58578
                     -5	  -0.47485	  -0.45715	  -0.41085	  -0.36288	  -0.31486	  -0.26801	  -0.22267	  -0.17961	  -0.13951	  -0.10341	  -0.07243
                     -2	  -0.18856	  -0.17128	  -0.12626	  -0.07993	  -0.03381	    0.01124	    0.05550	    0.09830	    0.13833	    0.17429	    0.20505
                      0	  -0.00728	    0.00942	    0.05295	    0.09784	    0.14261	    0.18717	    0.23185	    0.27526	    0.31590	    0.35244	    0.38352
                      1	    0.08167	    0.09819	    0.14127	    0.18566	    0.22998	    0.27472	    0.31965	    0.36326	    0.40404	    0.44066	    0.47024
                      2	    0.17106	    0.18754	    0.23044	    0.27459	    0.31889	    0.36405	    0.40931	    0.45315	    0.49406	    0.53071	    0.55694
                      3	    0.26218	    0.27865	    0.32148	    0.36553	    0.41021	    0.45590	    0.50157	    0.54572	    0.58683	    0.62358	    0.64612
                      4	    0.35621	    0.37264	    0.41529	    0.45931	    0.50440	    0.55048	    0.59645	    0.64078	    0.68196	    0.71799	    0.73759
                      5	    0.45250	    0.46893	    0.51159	    0.55600	    0.60165	    0.64825	    0.69464	    0.73924	    0.78059	    0.81438	    0.83256
                      6	    0.55042	    0.56700	    0.61020	    0.65549	    0.70203	    0.74946	    0.79654	    0.84171	    0.88351	    0.91423	    0.93111
                      7	    0.65106	    0.66777	    0.71162	    0.75773	    0.80512	    0.85346	    0.90118	    0.94695	    0.98925	    1.01663	    1.03196
                      8	    0.75500	    0.77185	    0.81639	    0.86320	    0.91133	    0.96036	    1.00909	    1.05550	    1.09743	    1.12191	    1.13522
                      9	    0.86257	    0.87978	    0.92507	    0.97275	    1.02180	    1.07177	    1.12114	    1.16807	    1.20728	    1.22910	    1.24104
                     10	    0.97389	    0.99134	    1.03726	    1.08560	    1.13530	    1.18574	    1.23533	    1.28251	    1.31737	    1.33678	    1.34873
                     11	    1.08587	    1.10339	    1.14951	    1.19796	    1.24778	    1.29822	    1.34774	    1.39459	    1.42479	    1.44155	    1.45310
                     12	    1.17586	    1.19304	    1.23823	    1.28569	    1.33449	    1.38387	    1.43226	    1.47658	    1.50204	    1.51571	    1.52492
                     13	    1.23729	    1.25439	    1.29936	    1.34635	    1.39468	    1.44352	    1.49130	    1.53127	    1.55274	    1.56534	    1.57144
                     14	    1.28842	    1.30550	    1.35043	    1.39754	    1.44599	    1.49486	    1.54257	    1.57739	    1.59573	    1.60729	    1.61128
                     15	    1.33488	    1.35201	    1.39704	    1.44421	    1.49273	    1.54158	    1.58889	    1.61831	    1.63355	    1.64220	    1.64576
                     16	    1.37433	    1.39157	    1.43684	    1.48420	    1.53292	    1.58186	    1.62669	    1.65089	    1.66468	    1.67022	    1.67371
                     17	    1.41086	    1.42818	    1.47364	    1.52119	    1.57008	    1.61909	    1.65858	    1.67876	    1.69037	    1.69451	    1.69790
                     18	    1.43930	    1.45676	    1.50253	    1.55038	    1.59954	    1.64871	    1.68214	    1.69885	    1.70688	    1.71096	    1.71430
                     19	    1.45934	    1.47698	    1.52318	    1.57147	    1.62101	    1.66902	    1.69562	    1.71007	    1.71539	    1.71952	    1.72289
                     20	    1.47369	    1.49147	    1.53801	    1.58664	    1.63647	    1.67953	    1.70111	    1.71225	    1.71711	    1.72126	    1.72463
                     30	    1.64198	    1.66074	    1.68893	    1.69506	    1.69605	    1.69680	    1.69739	    1.69784	    1.69819	    1.69847	    1.69867
                     60	    1.56473	    1.56516	    1.56618	    1.56707	    1.56780	    1.56839	    1.56884	    1.56915	    1.56934	    1.56945	    1.56949
            </tableData>
          </table>
       </product>
    </function>
    <function name="aero/c/CFZDADL">
    <description>LIFT INCREMENT DUE TO LEFT AILERON DEFLECTION</description>
    <product>
          <property>fcs/roll-pos-left-deg</property>
          <table>
            <independentVar lookup="row">aero/alpha-deg</independentVar>
            <independentVar lookup="column">aero/beta-deg</independentVar>
            <tableData>
                                -20	        -10	         -5	         -2	          0	          2	          5	         10	         20
                    -10	    0.00267	    0.00243	    0.00243	    0.00246	    0.00248	    0.00251	    0.00257	    0.00268	    0.00284
                     -5	    0.00283	    0.00357	    0.00385	    0.00394	    0.00399	    0.00405	    0.00413	    0.00426	    0.00416
                     -2	    0.00276	    0.00348	    0.00376	    0.00398	    0.00409	    0.00418	    0.00424	    0.00443	    0.00433
                      0	    0.00271	    0.00340	    0.00370	    0.00389	    0.00399	    0.00409	    0.00418	    0.00436	    0.00434
                      1	    0.00269	    0.00336	    0.00369	    0.00387	    0.00398	    0.00408	    0.00421	    0.00439	    0.00439
                      2	    0.00268	    0.00337	    0.00371	    0.00389	    0.00400	    0.00411	    0.00425	    0.00444	    0.00447
                      3	    0.00268	    0.00341	    0.00374	    0.00393	    0.00404	    0.00415	    0.00431	    0.00451	    0.00456
                      4	    0.00269	    0.00344	    0.00379	    0.00398	    0.00410	    0.00421	    0.00438	    0.00464	    0.00465
                      5	    0.00271	    0.00348	    0.00384	    0.00404	    0.00416	    0.00429	    0.00445	    0.00467	    0.00474
                      6	    0.00275	    0.00353	    0.00390	    0.00410	    0.00424	    0.00436	    0.00453	    0.00477	    0.00473
                      7	    0.00278	    0.00358	    0.00397	    0.00417	    0.00431	    0.00444	    0.00462	    0.00486	    0.00482
                      8	    0.00278	    0.00367	    0.00402	    0.00424	    0.00438	    0.00452	    0.00470	    0.00495	    0.00499
                      9	    0.00292	    0.00367	    0.00408	    0.00431	    0.00446	    0.00459	    0.00478	    0.00503	    0.00471
                     10	    0.00292	    0.00368	    0.00413	    0.00437	    0.00452	    0.00466	    0.00480	    0.00471	    0.00403
                     11	    0.00281	    0.00370	    0.00414	    0.00440	    0.00450	    0.00450	    0.00431	    0.00400	    0.00350
                     12	    0.00292	    0.00379	    0.00413	    0.00411	    0.00395	    0.00382	    0.00368	    0.00355	    0.00308
                     13	    0.00293	    0.00381	    0.00375	    0.00345	    0.00333	    0.00326	    0.00320	    0.00312	    0.00263
                     14	    0.00285	    0.00360	    0.00315	    0.00300	    0.00293	    0.00286	    0.00277	    0.00268	    0.00223
                     15	    0.00285	    0.00308	    0.00275	    0.00262	    0.00252	    0.00244	    0.00233	    0.00217	    0.00175
                     16	    0.00284	    0.00267	    0.00238	    0.00221	    0.00212	    0.00202	    0.00190	    0.00172	    0.00128
                     17	    0.00296	    0.00228	    0.00199	    0.00180	    0.00169	    0.00158	    0.00144	    0.00120	    0.00092
                     18	    0.00277	    0.00192	    0.00156	    0.00137	    0.00125	    0.00112	    0.00098	    0.00083	    0.00067
                     19	    0.00239	    0.00155	    0.00116	    0.00093	    0.00083	    0.00074	    0.00069	    0.00061	    0.00039
                     20	    0.00208	    0.00119	    0.00079	    0.00064	    0.00058	    0.00052	    0.00047	    0.00036	    0.00020
                     30	    0.00020	    0.00013	    0.00011	    0.00009	    0.00009	    0.00008	    0.00007	    0.00006	    0.00008
                     60	    0.00010	    0.00008	    0.00007	    0.00007	    0.00007	    0.00007	    0.00007	    0.00007	    0.00009
            </tableData>
          </table>
       </product>
    </function>
    <function name="aero/c/CFZDADR">
    <description>LIFT INCREMENT DUE TO RIGHT AILERON DEFLECTION</description>
    <product>
          <property>fcs/roll-pos-right-deg</property>
          <table>
            <independentVar lookup="row">aero/alpha-deg</independentVar>
            <independentVar lookup="column">aero/beta-deg</independentVar>
            <tableData>
                                -20	        -10	         -5	         -2	          0	          2	          5	         10	         20
                    -10	    0.00267	    0.00243	    0.00243	    0.00246	    0.00248	    0.00251	    0.00257	    0.00268	    0.00284
                     -5	    0.00283	    0.00357	    0.00385	    0.00394	    0.00399	    0.00405	    0.00413	    0.00426	    0.00416
                     -2	    0.00276	    0.00348	    0.00376	    0.00398	    0.00409	    0.00418	    0.00424	    0.00443	    0.00433
                      0	    0.00271	    0.00340	    0.00370	    0.00389	    0.00399	    0.00409	    0.00418	    0.00436	    0.00434
                      1	    0.00269	    0.00336	    0.00369	    0.00387	    0.00398	    0.00408	    0.00421	    0.00439	    0.00439
                      2	    0.00268	    0.00337	    0.00371	    0.00389	    0.00400	    0.00411	    0.00425	    0.00444	    0.00447
                      3	    0.00268	    0.00341	    0.00374	    0.00393	    0.00404	    0.00415	    0.00431	    0.00451	    0.00456
                      4	    0.00269	    0.00344	    0.00379	    0.00398	    0.00410	    0.00421	    0.00438	    0.00464	    0.00465
                      5	    0.00271	    0.00348	    0.00384	    0.00404	    0.00416	    0.00429	    0.00445	    0.00467	    0.00474
                      6	    0.00275	    0.00353	    0.00390	    0.00410	    0.00424	    0.00436	    0.00453	    0.00477	    0.00473
                      7	    0.00278	    0.00358	    0.00397	    0.00417	    0.00431	    0.00444	    0.00462	    0.00486	    0.00482
                      8	    0.00278	    0.00367	    0.00402	    0.00424	    0.00438	    0.00452	    0.00470	    0.00495	    0.00499
                      9	    0.00292	    0.00367	    0.00408	    0.00431	    0.00446	    0.00459	    0.00478	    0.00503	    0.00471
                     10	    0.00292	    0.00368	    0.00413	    0.00437	    0.00452	    0.00466	    0.00480	    0.00471	    0.00403
                     11	    0.00281	    0.00370	    0.00414	    0.00440	    0.00450	    0.00450	    0.00431	    0.00400	    0.00350
                     12	    0.00292	    0.00379	    0.00413	    0.00411	    0.00395	    0.00382	    0.00368	    0.00355	    0.00308
                     13	    0.00293	    0.00381	    0.00375	    0.00345	    0.00333	    0.00326	    0.00320	    0.00312	    0.00263
                     14	    0.00285	    0.00360	    0.00315	    0.00300	    0.00293	    0.00286	    0.00277	    0.00268	    0.00223
                     15	    0.00285	    0.00308	    0.00275	    0.00262	    0.00252	    0.00244	    0.00233	    0.00217	    0.00175
                     16	    0.00284	    0.00267	    0.00238	    0.00221	    0.00212	    0.00202	    0.00190	    0.00172	    0.00128
                     17	    0.00296	    0.00228	    0.00199	    0.00180	    0.00169	    0.00158	    0.00144	    0.00120	    0.00092
                     18	    0.00277	    0.00192	    0.00156	    0.00137	    0.00125	    0.00112	    0.00098	    0.00083	    0.00067
                     19	    0.00239	    0.00155	    0.00116	    0.00093	    0.00083	    0.00074	    0.00069	    0.00061	    0.00039
                     20	    0.00208	    0.00119	    0.00079	    0.00064	    0.00058	    0.00052	    0.00047	    0.00036	    0.00020
                     30	    0.00020	    0.00013	    0.00011	    0.00009	    0.00009	    0.00008	    0.00007	    0.00006	    0.00008
                     60	    0.00010	    0.00008	    0.00007	    0.00007	    0.00007	    0.00007	    0.00007	    0.00007	    0.00009
            </tableData>
          </table>
       </product>
    </function>
    <function name="aero/c/CFZDDS">
    <description>LIFT INCREMENT DUE TO PITCH TRIM</description>
    <product>
          <table>
            <independentVar lookup="row">aero/alpha-deg</independentVar>
            <independentVar lookup="column">fcs/pitch-trim-pos-deg</independentVar>
            <tableData>
                                 -4	         12
                    -10	  -0.12997	    0.33528
                     -5	  -0.11882	    0.33699
                     -2	  -0.11184	    0.32750
                      0	  -0.10733	    0.31633
                      1	  -0.10525	    0.31201
                      2	  -0.10347	    0.30735
                      3	  -0.10220	    0.30320
                      4	  -0.10156	    0.29929
                      5	  -0.10192	    0.29479
                      6	  -0.10340	    0.28990
                      7	  -0.10541	    0.28455
                      8	  -0.10772	    0.27822
                      9	  -0.11139	    0.26971
                     10	  -0.11432	    0.25890
                     11	  -0.11546	    0.24437
                     12	  -0.11402	    0.22381
                     13	  -0.11400	    0.20645
                     14	  -0.11533	    0.19129
                     15	  -0.11655	    0.17484
                     16	  -0.11817	    0.15853
                     17	  -0.11975	    0.14124
                     18	  -0.12163	    0.12400
                     19	  -0.12390	    0.10685
                     20	  -0.12581	    0.08876
                     30	  -0.03117	  -0.00311
                     60	    0.01225	  -0.00250
            </tableData>
          </table>
       </product>
    </function>
    <function name="aero/c/CFZDFM">
    <description>LIFT INCREMENT DUE TO FLAPS</description>
    <product>
          <property>fcs/flap-pos-deg</property>
          <table>
            <independentVar lookup="row">aero/alpha-deg</independentVar>
            <tableData>
                    -10		    0.02060
                     -5		    0.02265
                     -2		    0.02380
                      0		    0.02457
                      1		    0.02499
                      2		    0.02541
                      3		    0.02584
                      4		    0.02616
                      5		    0.02579
                      6		    0.02463
                      7		    0.02300
                      8		    0.02103
                      9		    0.01873
                     10		    0.01617
                     11		    0.01343
                     12		    0.01127
                     13		    0.00986
                     14		    0.00871
                     15		    0.00771
                     16		    0.00691
                     17		    0.00622
                     18		    0.00575
                     19		    0.00554
                     20		    0.00551
                     30		    0.00763
                     60		    0.00732
            </tableData>
          </table>
       </product>
    </function>
    <function name="aero/c/CFZDRD">
    <description>LIFT INCREMENT DUE TO RUDDER DEFLECTION</description>
    <product>
          <property>fcs/yaw-pos-deg</property>
          <table>
            <independentVar lookup="row">aero/alpha-deg</independentVar>
            <independentVar lookup="column">aero/beta-deg</independentVar>
            <tableData>
                                -20	        -10	         -5	         -2	          0	          2	          5	         10	         20
                    -10	    0.00032	    0.00015	    0.00011	    0.00007	    0.00011	    0.00010	    0.00011	    0.00009	    0.00001
                     -5	    0.00041	    0.00003	    0.00003	    0.00010	    0.00008	    0.00017	    0.00018	    0.00018	    0.00015
                     -2	    0.00039	    0.00006	  -0.00001	    0.00008	    0.00018	    0.00020	    0.00018	    0.00018	    0.00020
                      0	    0.00037	    0.00005	    0.00004	    0.00007	    0.00010	    0.00015	    0.00012	    0.00012	    0.00024
                      1	    0.00037	    0.00002	    0.00004	    0.00004	    0.00000	    0.00010	    0.00009	    0.00009	    0.00025
                      2	    0.00037	    0.00002	    0.00003	    0.00006	    0.00001	    0.00004	    0.00006	    0.00008	    0.00025
                      3	    0.00037	    0.00003	    0.00004	    0.00008	    0.00001	   0.00000	    0.00003	    0.00008	    0.00026
                      4	    0.00038	    0.00002	    0.00004	    0.00006	    0.00002	  -0.00001	    0.00001	    0.00007	    0.00026
                      5	    0.00040	    0.00002	    0.00004	    0.00009	    0.00003	  -0.00003	    0.00001	    0.00006	    0.00024
                      6	    0.00039	    0.00004	    0.00006	    0.00008	    0.00003	  -0.00004	   0.00000	    0.00004	    0.00014
                      7	    0.00034	    0.00001	    0.00005	    0.00013	    0.00004	  -0.00008	  -0.00002	    0.00006	    0.00020
                      8	    0.00030	    0.00001	    0.00008	    0.00010	    0.00002	  -0.00006	  -0.00007	    0.00011	    0.00036
                      9	    0.00027	    0.00000	    0.00012	    0.00015	    0.00001	  -0.00012	  -0.00012	    0.00006	    0.00040
                     10	    0.00024	   0.00000	    0.00013	    0.00017	    0.00002	  -0.00014	  -0.00012	    0.00007	    0.00044
                     11	    0.00023	  -0.00004	    0.00010	    0.00013	    0.00003	  -0.00008	  -0.00007	    0.00011	    0.00046
                     12	    0.00022	  -0.00006	    0.00008	    0.00011	    0.00004	  -0.00005	  -0.00004	    0.00015	    0.00042
                     13	    0.00020	  -0.00008	    0.00008	    0.00010	    0.00004	  -0.00003	  -0.00003	    0.00018	    0.00050
                     14	    0.00017	  -0.00008	    0.00008	    0.00009	    0.00004	   0.00000	  -0.00001	    0.00019	    0.00050
                     15	    0.00013	  -0.00012	    0.00005	    0.00008	    0.00005	    0.00003	    0.00004	    0.00023	    0.00053
                     16	  -0.00009	  -0.00015	    0.00006	    0.00008	    0.00005	    0.00002	    0.00004	    0.00027	    0.00060
                     17	  -0.00014	  -0.00025	    0.00002	    0.00006	    0.00011	    0.00011	    0.00017	    0.00038	    0.00063
                     18	  -0.00005	  -0.00031	  -0.00013	    0.00007	    0.00031	    0.00035	    0.00032	    0.00042	    0.00066
                     19	  -0.00006	  -0.00030	  -0.00025	    0.00001	    0.00034	    0.00039	    0.00034	    0.00043	    0.00068
                     20	  -0.00007	  -0.00030	  -0.00022	  -0.00016	    0.00011	    0.00030	    0.00037	    0.00045	    0.00071
                     30	  -0.00024	    0.00005	    0.00013	    0.00010	    0.00008	    0.00006	    0.00002	    0.00005	    0.00041
                     60	  -0.00002	  -0.00003	  -0.00004	  -0.00001	    0.00000	    0.00001	    0.00004	    0.00008	    0.00017
            </tableData>
          </table>
       </product>
    </function>
    <function name="aero/c/CFZDSM">
    <description>LIFT INCREMENT DUE TO SLATS</description>
    <product>
          <property>fcs/slat-pos-deg</property>
          <table>
            <independentVar lookup="row">aero/alpha-deg</independentVar>
            <tableData>
                    -10		    0.01867
                     -5		    0.02053
                     -2		    0.02245
                      0		    0.02394
                      1		    0.02465
                      2		    0.02528
                      3		    0.02581
                      4		    0.02626
                      5		    0.02667
                      6		    0.02702
                      7		    0.02691
                      8		    0.02552
                      9		    0.02325
                     10		    0.02051
                     11		    0.01763
                     12		    0.01547
                     13		    0.01386
                     14		    0.01236
                     15		    0.01104
                     16		    0.00999
                     17		    0.00908
                     18		    0.00847
                     19		    0.00819
                     20		    0.00814
                     30		    0.01021
                     60		    0.00980
            </tableData>
          </table>
       </product>
    </function>
    <function name="aero/c/CFZDSPL">
    <description>LIFT INCREMENT DUE TO SPOILERS LEFT</description>
    <product>
          <table>
            <independentVar lookup="row">aero/alpha-deg</independentVar>
            <independentVar lookup="column">fcs/speedbrake-left-deg</independentVar>
            <tableData>
                                  0	         20	         50
                    -10	    0.00000	  -0.21190	  -0.25197
                     -5	    0.00000	  -0.27412	  -0.36217
                     -2	    0.00000	  -0.26069	  -0.40130
                      0	    0.00000	  -0.25267	  -0.41920
                      1	    0.00000	  -0.25115	  -0.42643
                      2	    0.00000	  -0.25208	  -0.42949
                      3	    0.00000	  -0.25511	  -0.43214
                      4	    0.00000	  -0.25935	  -0.43623
                      5	    0.00000	  -0.26387	  -0.44335
                      6	    0.00000	  -0.26912	  -0.45172
                      7	    0.00000	  -0.27362	  -0.45763
                      8	    0.00000	  -0.27610	  -0.46304
                      9	    0.00000	  -0.27800	  -0.46890
                     10	    0.00000	  -0.27921	  -0.47373
                     11	    0.00000	  -0.27813	  -0.47407
                     12	    0.00000	  -0.25982	  -0.45473
                     13	    0.00000	  -0.22738	  -0.42221
                     14	    0.00000	  -0.19326	  -0.38582
                     15	    0.00000	  -0.16044	  -0.34719
                     16	    0.00000	  -0.12353	  -0.30555
                     17	    0.00000	  -0.08671	  -0.26648
                     18	    0.00000	  -0.04828	  -0.22173
                     19	    0.00000	  -0.01433	  -0.17645
                     20	    0.00000	    0.00311	  -0.13286
                     30	    0.00000	    0.00001	  -0.00376
                     60	    0.00000	    0.00340	    0.00075
            </tableData>
          </table>
       </product>
    </function>
    <function name="aero/c/CFZDSPR">
    <description>LIFT INCREMENT DUE TO SPOILERS RIGHT</description>
    <product>
          <table>
            <independentVar lookup="row">aero/alpha-deg</independentVar>
            <independentVar lookup="column">fcs/speedbrake-right-deg</independentVar>
            <tableData>
                                  0	         20	         50
                    -10	    0.00000	  -0.21190	  -0.25197
                     -5	    0.00000	  -0.27412	  -0.36217
                     -2	    0.00000	  -0.26069	  -0.40130
                      0	    0.00000	  -0.25267	  -0.41920
                      1	    0.00000	  -0.25115	  -0.42643
                      2	    0.00000	  -0.25208	  -0.42949
                      3	    0.00000	  -0.25511	  -0.43214
                      4	    0.00000	  -0.25935	  -0.43623
                      5	    0.00000	  -0.26387	  -0.44335
                      6	    0.00000	  -0.26912	  -0.45172
                      7	    0.00000	  -0.27362	  -0.45763
                      8	    0.00000	  -0.27610	  -0.46304
                      9	    0.00000	  -0.27800	  -0.46890
                     10	    0.00000	  -0.27921	  -0.47373
                     11	    0.00000	  -0.27813	  -0.47407
                     12	    0.00000	  -0.25982	  -0.45473
                     13	    0.00000	  -0.22738	  -0.42221
                     14	    0.00000	  -0.19326	  -0.38582
                     15	    0.00000	  -0.16044	  -0.34719
                     16	    0.00000	  -0.12353	  -0.30555
                     17	    0.00000	  -0.08671	  -0.26648
                     18	    0.00000	  -0.04828	  -0.22173
                     19	    0.00000	  -0.01433	  -0.17645
                     20	    0.00000	    0.00311	  -0.13286
                     30	    0.00000	    0.00001	  -0.00376
                     60	    0.00000	    0.00340	    0.00075
            </tableData>
          </table>
       </product>
    </function>
    <function name="aero/c/CFZGEAR">
    <description>LIFT INCREMENT DUE TO GEAR</description>
    <product>
          <property>gear/gear-pos-norm</property>
          <table>
            <independentVar lookup="row">aero/alpha-deg</independentVar>
            <tableData>
                    -10		  -0.00290
                     -5		  -0.00195
                     -2		  -0.00112
                      0		  -0.00054
                      1		  -0.00024
                      2		    0.00006
                      3		    0.00034
                      4		    0.00062
                      5		    0.00085
                      6		    0.00103
                      7		    0.00142
                      8		    0.00147
                      9		  -0.00118
                     10		    0.00158
                     11		    0.00243
                     12		    0.00684
                     13		    0.00963
                     14		    0.00944
                     15		    0.00991
                     16		    0.00949
                     17		    0.00054
                     18		  -0.00272
                     19		  -0.00210
                     20		  -0.00001
                     30		    0.01666
                     60		    0.02822
            </tableData>
          </table>
       </product>
    </function>
    <function name="aero/c/CMM1">
    <description>BASE PITCHING MOMENT</description>
    <product>
          <table>
            <independentVar lookup="row">aero/alpha-deg</independentVar>
            <independentVar lookup="column">fcs/pitch-pos-deg</independentVar>
            <tableData>
                                -17	        -15	        -10	         -5	          0	          5	         10	         15	         20	         25	         30
                    -10	    1.02319	    0.98259	    0.81253	    0.62688	    0.44016	    0.25828	    0.08330	  -0.08146	  -0.23205	  -0.36497	  -0.47760
                     -5	    0.78268	    0.71592	    0.54172	    0.36199	    0.18290	    0.00901	  -0.15876	  -0.31763	  -0.46522	  -0.59774	  -0.71127
                     -2	    0.63792	    0.57199	    0.40057	    0.22461	    0.05002	  -0.12013	  -0.28701	  -0.44810	  -0.59848	  -0.73333	  -0.84854
                      0	    0.54325	    0.47910	    0.31209	    0.14009	  -0.03119	  -0.20147	  -0.37208	  -0.53767	  -0.69259	  -0.83170	  -0.94993
                      1	    0.49942	    0.43582	    0.27021	    0.09966	  -0.07042	  -0.24202	  -0.41425	  -0.58131	  -0.73748	  -0.87759	  -0.99045
                      2	    0.45694	    0.39369	    0.22913	    0.05991	  -0.10983	  -0.28278	  -0.45610	  -0.62395	  -0.78058	  -0.92089	  -1.02045
                      3	    0.41496	    0.35210	    0.18872	    0.02081	  -0.14953	  -0.32367	  -0.49789	  -0.66633	  -0.82324	  -0.96356	  -1.04817
                      4	    0.37539	    0.31281	    0.15030	  -0.01737	  -0.18912	  -0.36472	  -0.54010	  -0.70932	  -0.86670	  -1.00426	  -1.07735
                      5	    0.33701	    0.27470	    0.11294	  -0.05549	  -0.22861	  -0.40557	  -0.58195	  -0.75179	  -0.90942	  -1.03776	  -1.10501
                      6	    0.30001	    0.23798	    0.07632	  -0.09321	  -0.26758	  -0.44568	  -0.62291	  -0.79324	  -0.95113	  -1.06599	  -1.12722
                      7	    0.26367	    0.20195	    0.03986	  -0.13060	  -0.30613	  -0.48564	  -0.66350	  -0.83444	  -0.99278	  -1.09307	  -1.14735
                      8	    0.22631	    0.16466	    0.00176	  -0.16964	  -0.34626	  -0.52676	  -0.70682	  -0.87897	  -1.03451	  -1.12227	  -1.16794
                      9	    0.18598	    0.12370	  -0.04043	  -0.21341	  -0.39192	  -0.57460	  -0.75585	  -0.92883	  -1.07251	  -1.14898	  -1.18877
                     10	    0.14291	    0.08018	  -0.08508	  -0.25949	  -0.43941	  -0.62297	  -0.80423	  -0.97751	  -1.10333	  -1.17010	  -1.20958
                     11	    0.09985	    0.03682	  -0.12940	  -0.30459	  -0.48537	  -0.66940	  -0.85096	  -1.02352	  -1.13146	  -1.18869	  -1.22724
                     12	    0.06611	    0.00287	  -0.16391	  -0.33962	  -0.52101	  -0.70542	  -0.88700	  -1.05361	  -1.14666	  -1.19516	  -1.22739
                     13	    0.04109	  -0.02250	  -0.19019	  -0.36678	  -0.54916	  -0.73429	  -0.91623	  -1.06815	  -1.14811	  -1.19447	  -1.21669
                     14	    0.01460	  -0.04937	  -0.21807	  -0.39560	  -0.57899	  -0.76484	  -0.94712	  -1.07933	  -1.14793	  -1.19095	  -1.20573
                     15	  -0.01472	  -0.07911	  -0.24890	  -0.42744	  -0.61191	  -0.79853	  -0.98007	  -1.09186	  -1.14941	  -1.18226	  -1.19594
                     16	  -0.04783	  -0.11266	  -0.28349	  -0.46303	  -0.64853	  -0.83584	  -1.00792	  -1.09988	  -1.15231	  -1.17398	  -1.18765
                     17	  -0.08420	  -0.14949	  -0.32138	  -0.50199	  -0.68856	  -0.87657	  -1.02816	  -1.10530	  -1.15014	  -1.16696	  -1.18063
                     18	  -0.12556	  -0.19127	  -0.36415	  -0.54577	  -0.73328	  -0.92187	  -1.04982	  -1.11412	  -1.14600	  -1.16281	  -1.17645
                     19	  -0.17281	  -0.23894	  -0.41274	  -0.59532	  -0.78370	  -0.96710	  -1.06834	  -1.12389	  -1.14553	  -1.16228	  -1.17584
                     20	  -0.22478	  -0.29132	  -0.46611	  -0.64972	  -0.83899	  -1.00303	  -1.08521	  -1.12850	  -1.14837	  -1.16507	  -1.17857
                     30	  -0.82699	  -0.89565	  -1.00055	  -1.02887	  -1.03871	  -1.04680	  -1.05348	  -1.05894	  -1.06335	  -1.06683	  -1.06949
                     60	  -0.57583	  -0.57873	  -0.58570	  -0.59205	  -0.59758	  -0.60215	  -0.60571	  -0.60827	  -0.60993	  -0.61083	  -0.61116
            </tableData>
          </table>
       </product>
    </function>
    <function name="aero/c/CMMALPHADOT">
    <description>PITCH MOMENT DERIVATIVE FOR ALPHA DOT</description>
    <product>
          <property>aero/ci2vel</property>
          <property>aero/alphadot-rad_sec</property>
          <table>
            <independentVar lookup="row">aero/alpha-deg</independentVar>
            <tableData>
                    -10		  -3.46517
                     -5		  -3.10029
                     -2		  -0.87698
                      0		  -2.80759
                      1		  -2.76537
                      2		  -2.76602
                      3		  -2.78063
                      4		  -2.65883
                      5		  -2.46742
                      6		  -2.71575
                      7		  -2.89097
                      8		  -3.03992
                      9		  -2.54836
                     10		  -2.02473
                     11		  -3.04769
                     12		  -2.53927
                     13		  -2.39447
                     14		  -2.56470
                     15		  -2.79480
                     16		  -2.99947
                     17		  -0.50386
                     18		  -2.04430
                     19		  -3.61328
                     20		  -3.00356
                     30		    0.77426
                     60		    0.82654
            </tableData>
          </table>
       </product>
    </function>
    <function name="aero/c/CMMBETADOT">
    <description>PITCH MOMENT DERIVATIVE FOR BETA DOT</description>
    <product>
          <property>aero/ci2vel</property>
          <property>aero/betadot-rad_sec</property>
          <table>
            <independentVar lookup="row">aero/alpha-deg</independentVar>
            <tableData>
                    -10		  -0.04334
                     -5		  -0.46266
                     -2		    0.06571
                      0		  -0.00513
                      1		    0.04032
                      2		  -0.01892
                      3		  -0.08138
                      4		  -0.11426
                      5		  -0.26636
                      6		  -0.31007
                      7		    0.21641
                      8		    0.25724
                      9		    0.32316
                     10		  -0.21554
                     11		  -1.39779
                     12		  -0.67744
                     13		  -0.34272
                     14		  -0.32313
                     15		  -0.26920
                     16		  -0.21704
                     17		    0.75469
                     18		  -0.10538
                     19		  -1.51496
                     20		  -1.39097
                     30		  -0.17690
                     60		    0.16240
            </tableData>
          </table>
       </product>
    </function>
    <function name="aero/c/CMMDADL">
    <description>PITCH MOMENT DUE TO LEFT AILERON DEFLECTION</description>
    <product>
          <property>fcs/roll-pos-left-deg</property>
          <table>
            <independentVar lookup="row">aero/alpha-deg</independentVar>
            <independentVar lookup="column">aero/beta-deg</independentVar>
            <tableData>
                                -20	        -10	         -5	         -2	          0	          2	          5	         10	         20
                    -10	  -0.00218	  -0.00186	  -0.00185	  -0.00186	  -0.00188	  -0.00189	  -0.00189	  -0.00189	  -0.00143
                     -5	  -0.00218	  -0.00272	  -0.00309	  -0.00318	  -0.00325	  -0.00331	  -0.00338	  -0.00348	  -0.00291
                     -2	  -0.00214	  -0.00284	  -0.00308	  -0.00332	  -0.00344	  -0.00355	  -0.00361	  -0.00385	  -0.00330
                      0	  -0.00215	  -0.00279	  -0.00304	  -0.00327	  -0.00338	  -0.00350	  -0.00360	  -0.00384	  -0.00343
                      1	  -0.00210	  -0.00273	  -0.00308	  -0.00327	  -0.00338	  -0.00350	  -0.00365	  -0.00387	  -0.00351
                      2	  -0.00209	  -0.00274	  -0.00310	  -0.00329	  -0.00341	  -0.00353	  -0.00369	  -0.00393	  -0.00361
                      3	  -0.00209	  -0.00280	  -0.00313	  -0.00332	  -0.00344	  -0.00357	  -0.00374	  -0.00400	  -0.00371
                      4	  -0.00211	  -0.00282	  -0.00316	  -0.00335	  -0.00348	  -0.00361	  -0.00380	  -0.00422	  -0.00380
                      5	  -0.00213	  -0.00284	  -0.00319	  -0.00340	  -0.00353	  -0.00366	  -0.00386	  -0.00413	  -0.00388
                      6	  -0.00218	  -0.00288	  -0.00322	  -0.00344	  -0.00357	  -0.00371	  -0.00391	  -0.00419	  -0.00369
                      7	  -0.00220	  -0.00291	  -0.00329	  -0.00349	  -0.00362	  -0.00376	  -0.00397	  -0.00426	  -0.00372
                      8	  -0.00220	  -0.00311	  -0.00331	  -0.00353	  -0.00366	  -0.00381	  -0.00403	  -0.00431	  -0.00400
                      9	  -0.00273	  -0.00298	  -0.00336	  -0.00357	  -0.00372	  -0.00384	  -0.00409	  -0.00437	  -0.00374
                     10	  -0.00275	  -0.00299	  -0.00340	  -0.00361	  -0.00375	  -0.00389	  -0.00409	  -0.00419	  -0.00327
                     11	  -0.00224	  -0.00300	  -0.00340	  -0.00363	  -0.00375	  -0.00381	  -0.00382	  -0.00378	  -0.00288
                     12	  -0.00240	  -0.00319	  -0.00340	  -0.00352	  -0.00349	  -0.00348	  -0.00346	  -0.00346	  -0.00249
                     13	  -0.00242	  -0.00320	  -0.00324	  -0.00320	  -0.00316	  -0.00315	  -0.00313	  -0.00313	  -0.00211
                     14	  -0.00229	  -0.00299	  -0.00295	  -0.00290	  -0.00288	  -0.00286	  -0.00282	  -0.00280	  -0.00174
                     15	  -0.00231	  -0.00278	  -0.00268	  -0.00263	  -0.00260	  -0.00257	  -0.00251	  -0.00243	  -0.00138
                     16	  -0.00233	  -0.00253	  -0.00242	  -0.00235	  -0.00231	  -0.00226	  -0.00219	  -0.00207	  -0.00103
                     17	  -0.00271	  -0.00230	  -0.00215	  -0.00207	  -0.00202	  -0.00196	  -0.00186	  -0.00172	  -0.00075
                     18	  -0.00229	  -0.00206	  -0.00189	  -0.00180	  -0.00171	  -0.00164	  -0.00155	  -0.00140	  -0.00058
                     19	  -0.00212	  -0.00179	  -0.00162	  -0.00151	  -0.00143	  -0.00137	  -0.00131	  -0.00119	  -0.00035
                     20	  -0.00195	  -0.00152	  -0.00133	  -0.00127	  -0.00121	  -0.00117	  -0.00108	  -0.00085	  -0.00017
                     30	  -0.00039	  -0.00028	  -0.00023	  -0.00021	  -0.00019	  -0.00017	  -0.00015	  -0.00013	  -0.00017
                     60	  -0.00013	  -0.00009	  -0.00008	  -0.00009	  -0.00009	  -0.00009	  -0.00010	  -0.00011	  -0.00014
            </tableData>
          </table>
       </product>
    </function>
    <function name="aero/c/CMMDADR">
    <description>PITCH MOMENT DUE TO RIGHT AILERON DEFLECTION</description>
    <product>
          <property>fcs/roll-pos-right-deg</property>
          <table>
            <independentVar lookup="row">aero/alpha-deg</independentVar>
            <independentVar lookup="column">aero/beta-deg</independentVar>
            <tableData>
                                -20	        -10	         -5	         -2	          0	          2	          5	         10	         20
                    -10	  -0.00218	  -0.00186	  -0.00185	  -0.00186	  -0.00188	  -0.00189	  -0.00189	  -0.00189	  -0.00143
                     -5	  -0.00218	  -0.00272	  -0.00309	  -0.00318	  -0.00325	  -0.00331	  -0.00338	  -0.00348	  -0.00291
                     -2	  -0.00214	  -0.00284	  -0.00308	  -0.00332	  -0.00344	  -0.00355	  -0.00361	  -0.00385	  -0.00330
                      0	  -0.00215	  -0.00279	  -0.00304	  -0.00327	  -0.00338	  -0.00350	  -0.00360	  -0.00384	  -0.00343
                      1	  -0.00210	  -0.00273	  -0.00308	  -0.00327	  -0.00338	  -0.00350	  -0.00365	  -0.00387	  -0.00351
                      2	  -0.00209	  -0.00274	  -0.00310	  -0.00329	  -0.00341	  -0.00353	  -0.00369	  -0.00393	  -0.00361
                      3	  -0.00209	  -0.00280	  -0.00313	  -0.00332	  -0.00344	  -0.00357	  -0.00374	  -0.00400	  -0.00371
                      4	  -0.00211	  -0.00282	  -0.00316	  -0.00335	  -0.00348	  -0.00361	  -0.00380	  -0.00422	  -0.00380
                      5	  -0.00213	  -0.00284	  -0.00319	  -0.00340	  -0.00353	  -0.00366	  -0.00386	  -0.00413	  -0.00388
                      6	  -0.00218	  -0.00288	  -0.00322	  -0.00344	  -0.00357	  -0.00371	  -0.00391	  -0.00419	  -0.00369
                      7	  -0.00220	  -0.00291	  -0.00329	  -0.00349	  -0.00362	  -0.00376	  -0.00397	  -0.00426	  -0.00372
                      8	  -0.00220	  -0.00311	  -0.00331	  -0.00353	  -0.00366	  -0.00381	  -0.00403	  -0.00431	  -0.00400
                      9	  -0.00273	  -0.00298	  -0.00336	  -0.00357	  -0.00372	  -0.00384	  -0.00409	  -0.00437	  -0.00374
                     10	  -0.00275	  -0.00299	  -0.00340	  -0.00361	  -0.00375	  -0.00389	  -0.00409	  -0.00419	  -0.00327
                     11	  -0.00224	  -0.00300	  -0.00340	  -0.00363	  -0.00375	  -0.00381	  -0.00382	  -0.00378	  -0.00288
                     12	  -0.00240	  -0.00319	  -0.00340	  -0.00352	  -0.00349	  -0.00348	  -0.00346	  -0.00346	  -0.00249
                     13	  -0.00242	  -0.00320	  -0.00324	  -0.00320	  -0.00316	  -0.00315	  -0.00313	  -0.00313	  -0.00211
                     14	  -0.00229	  -0.00299	  -0.00295	  -0.00290	  -0.00288	  -0.00286	  -0.00282	  -0.00280	  -0.00174
                     15	  -0.00231	  -0.00278	  -0.00268	  -0.00263	  -0.00260	  -0.00257	  -0.00251	  -0.00243	  -0.00138
                     16	  -0.00233	  -0.00253	  -0.00242	  -0.00235	  -0.00231	  -0.00226	  -0.00219	  -0.00207	  -0.00103
                     17	  -0.00271	  -0.00230	  -0.00215	  -0.00207	  -0.00202	  -0.00196	  -0.00186	  -0.00172	  -0.00075
                     18	  -0.00229	  -0.00206	  -0.00189	  -0.00180	  -0.00171	  -0.00164	  -0.00155	  -0.00140	  -0.00058
                     19	  -0.00212	  -0.00179	  -0.00162	  -0.00151	  -0.00143	  -0.00137	  -0.00131	  -0.00119	  -0.00035
                     20	  -0.00195	  -0.00152	  -0.00133	  -0.00127	  -0.00121	  -0.00117	  -0.00108	  -0.00085	  -0.00017
                     30	  -0.00039	  -0.00028	  -0.00023	  -0.00021	  -0.00019	  -0.00017	  -0.00015	  -0.00013	  -0.00017
                     60	  -0.00013	  -0.00009	  -0.00008	  -0.00009	  -0.00009	  -0.00009	  -0.00010	  -0.00011	  -0.00014
            </tableData>
          </table>
       </product>
    </function>
    <function name="aero/c/CMMDDS">
    <description>PITCHING MOMENT INCREMENT DUE TO PITCH TRIM</description>
    <product>
          <table>
            <independentVar lookup="row">aero/alpha-deg</independentVar>
            <independentVar lookup="column">fcs/pitch-trim-pos-deg</independentVar>
            <tableData>
                                 -4	         12
                    -10	    0.46091	  -1.17141
                      2	    0.38768	  -1.12088
                      7	    0.38345	  -0.99159
                     12	    0.41596	  -0.78976
                     17	    0.45177	  -0.51036
                     60	  -0.00046	    0.04313
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            </tableData>
          </table>
       </product>
    </function>
    <function name="aero/c/CMMDFM">
    <description>PITCHING MOMENT INCREMENT DUE TO FLAPS</description>
    <product>
          <property>fcs/flap-pos-deg</property>
          <table>
            <independentVar lookup="row">aero/alpha-deg</independentVar>
            <tableData>
                    -10		  -0.00541
                     -5		  -0.00612
                      2		  -0.00746
                      6		  -0.00648
                     10		  -0.00173
                     14		    0.00019
                     18		    0.00107
                     60		  -0.00238
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            </tableData>
          </table>
       </product>
    </function>
    <function name="aero/c/CMMDRD">
    <description>PITCH MOMENT DUE TO RUDDER DEFLECTION</description>
    <product>
          <property>fcs/yaw-pos-deg</property>
          <table>
            <independentVar lookup="row">aero/alpha-deg</independentVar>
            <independentVar lookup="column">aero/beta-deg</independentVar>
            <tableData>
                                -20	        -10	         -5	         -2	          0	          2	          5	         10	         20
                    -10	  -0.00130	  -0.00057	  -0.00083	  -0.00107	  -0.00113	  -0.00127	  -0.00130	  -0.00153	  -0.00208
                      2	  -0.00108	    0.00047	    0.00019	  -0.00007	  -0.00025	  -0.00061	  -0.00099	  -0.00153	  -0.00242
                      7	  -0.00102	    0.00063	    0.00024	  -0.00003	  -0.00024	  -0.00047	  -0.00076	  -0.00127	  -0.00209
                     12	  -0.00084	    0.00064	    0.00024	  -0.00004	  -0.00024	  -0.00039	  -0.00063	  -0.00109	  -0.00197
                     17	    0.00003	    0.00075	    0.00027	    0.00002	  -0.00012	  -0.00023	  -0.00048	  -0.00106	  -0.00222
                     60	    0.00003	    0.00009	    0.00010	    0.00004	    0.00001	  -0.00004	  -0.00013	  -0.00020	  -0.00043
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            </tableData>
          </table>
       </product>
    </function>
    <function name="aero/c/CMMDSM">
    <description>PITCHING MOMENT INCREMENT DUE TO SLATS</description>
    <product>
          <property>fcs/slat-pos-deg</property>
          <table>
            <independentVar lookup="row">aero/alpha-deg</independentVar>
            <tableData>
                    -10		  -0.00564
                     -5		  -0.00396
                      2		  -0.00200
                      6		  -0.00046
                     10		    0.00386
                     14		    0.00531
                     18		    0.00515
                     60		    0.00059
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            </tableData>
          </table>
       </product>
    </function>
    <function name="aero/c/CMMDSPL">
    <description>PITCHING MOMENT INCREMENT DUE TO SPOILERS LEFT</description>
    <product>
          <table>
            <independentVar lookup="row">aero/alpha-deg</independentVar>
            <independentVar lookup="column">fcs/speedbrake-left-deg</independentVar>
            <tableData>
                                  0	         20	         50
                    -10	    0.00000	    0.03046	    0.02375
                      2	    0.00000	    0.07459	    0.13568
                      7	    0.00000	    0.09221	    0.15226
                     12	    0.00000	    0.06169	    0.11206
                     17	    0.00000	    0.01384	    0.04335
                     60	    0.00000	    0.00102	    0.00534
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            </tableData>
          </table>
       </product>
    </function>
    <function name="aero/c/CMMDSPR">
    <description>PITCHING MOMENT INCREMENT DUE TO SPOILERS RIGHT</description>
    <product>
          <table>
            <independentVar lookup="row">aero/alpha-deg</independentVar>
            <independentVar lookup="column">fcs/speedbrake-right-deg</independentVar>
            <tableData>
                                  0	         20	         50
                    -10	    0.00000	    0.03046	    0.02375
                      2	    0.00000	    0.07459	    0.13568
                      7	    0.00000	    0.09221	    0.15226
                     12	    0.00000	    0.06169	    0.11206
                     17	    0.00000	    0.01384	    0.04335
                     60	    0.00000	    0.00102	    0.00534
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            </tableData>
          </table>
       </product>
    </function>
    <function name="aero/c/CMMGEAR">
    <description>PITCHING MOMENT INCREMENT DUE TO GEAR</description>
    <product>
          <property>gear/gear-pos-norm</property>
          <table>
            <independentVar lookup="row">aero/alpha-deg</independentVar>
            <tableData>
                    -10		  -0.00268
                     -5		  -0.00133
                      2		    0.00047
                      6		    0.00123
                     10		    0.00351
                     14		    0.02360
                     18		  -0.01383
                     60		    0.02026
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            </tableData>
          </table>
       </product>
    </function>
    <function name="aero/c/CMMQ">
    <description>PITCH DAMPING DERIVATIVE</description>
    <product>
          <property>aero/qb</property>
          <table>
            <independentVar lookup="row">aero/alpha-deg</independentVar>
            <tableData>
                    -10		 -28.67933
                     -5		 -25.43696
                      2		 -30.35789
                      6		 -34.46980
                     10		 -31.73128
                     14		 -21.66092
                     18		 -11.69351
                     60		    3.92563
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            </tableData>
          </table>
       </product>
    </function>
    <function name="aero/c/CML1">
    <description>BASE ROLLING MOMENT</description>
    <product>
          <table>
            <independentVar lookup="row">aero/alpha-deg</independentVar>
            <independentVar lookup="column">aero/beta-deg</independentVar>
            <tableData>
                                -20	        -10	         -5	         -2	          0	          2	          5	         10	         20
                    -10	    0.01684	    0.00750	    0.00337	    0.00125	    0.00000	  -0.00125	  -0.00337	  -0.00750	  -0.01684
                      2	    0.05147	    0.02677	    0.01284	    0.00510	    0.00000	  -0.00510	  -0.01284	  -0.02597	  -0.05147
                      7	    0.07049	    0.03690	    0.01859	    0.00742	    0.00000	  -0.00742	  -0.01859	  -0.03690	  -0.07196
                     12	    0.06496	    0.02870	    0.01152	    0.00375	    0.00000	  -0.00377	  -0.01153	  -0.02870	  -0.06495
                     17	    0.03359	    0.00995	    0.00464	    0.00179	    0.00000	  -0.00179	  -0.00464	  -0.00995	  -0.03359
                     60	    0.01761	    0.00722	    0.00346	    0.00137	    0.00000	  -0.00137	  -0.00346	  -0.00722	  -0.01761
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            </tableData>
          </table>
       </product>
    </function>
    <function name="aero/c/CMLBETADOT">
    <description>ROLL MOMENT DERIVATIVE FOR BETA DOT</description>
    <product>
          <property>aero/betadot-rad_sec</property>
          <table>
            <independentVar lookup="row">aero/alpha-deg</independentVar>
            <tableData>
                    -10		  -0.04151
                     -5		  -0.08360
                      2		  -0.14836
                      6		  -0.19609
                     10		  -0.25784
                     14		  -0.06650
                     18		  -0.05516
                     60		  -0.04080
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            </tableData>
          </table>
       </product>
    </function>
    <function name="aero/c/CMLDADL">
    <description>ROLLING MOMENT DUE TO LEFT AILERON DEFLECTION</description>
    <product>
          <property>fcs/roll-pos-left-deg</property>
          <table>
            <independentVar lookup="row">aero/alpha-deg</independentVar>
            <independentVar lookup="column">aero/beta-deg</independentVar>
            <tableData>
                                -20	        -10	         -5	         -2	          0	          2	          5	         10	         20
                    -10	    0.00088	    0.00074	    0.00072	    0.00072	    0.00072	    0.00073	    0.00074	    0.00078	    0.00091
                      2	    0.00089	    0.00110	    0.00124	    0.00129	    0.00133	    0.00137	    0.00141	    0.00147	    0.00151
                      7	    0.00090	    0.00117	    0.00130	    0.00136	    0.00141	    0.00145	    0.00150	    0.00157	    0.00169
                     12	    0.00102	    0.00125	    0.00138	    0.00137	    0.00132	    0.00126	    0.00118	    0.00111	    0.00097
                     17	    0.00099	    0.00081	    0.00068	    0.00061	    0.00056	    0.00051	    0.00045	    0.00035	    0.00022
                     60	    0.00005	    0.00004	    0.00004	    0.00004	    0.00004	    0.00003	    0.00003	    0.00003	    0.00002
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            </tableData>
          </table>
       </product>
    </function>
    <function name="aero/c/CMLDADR">
    <description>ROLLING MOMENT DUE TO RIGHT AILERON DEFLECTION</description>
    <product>
          <property>fcs/roll-pos-right-deg</property>
          <table>
            <independentVar lookup="row">aero/alpha-deg</independentVar>
            <independentVar lookup="column">aero/beta-deg</independentVar>
            <tableData>
                                -20	        -10	         -5	         -2	          0	          2	          5	         10	         20
                    -10	  -0.00088	  -0.00074	  -0.00072	  -0.00072	  -0.00072	  -0.00073	  -0.00074	  -0.00078	  -0.00091
                      2	  -0.00089	  -0.00110	  -0.00124	  -0.00129	  -0.00133	  -0.00137	  -0.00141	  -0.00147	  -0.00151
                      7	  -0.00090	  -0.00117	  -0.00130	  -0.00136	  -0.00141	  -0.00145	  -0.00150	  -0.00157	  -0.00169
                     12	  -0.00102	  -0.00125	  -0.00138	  -0.00137	  -0.00132	  -0.00126	  -0.00118	  -0.00111	  -0.00097
                     17	  -0.00099	  -0.00081	  -0.00068	  -0.00061	  -0.00056	  -0.00051	  -0.00045	  -0.00035	  -0.00022
                     60	  -0.00005	  -0.00004	  -0.00004	  -0.00004	  -0.00004	  -0.00003	  -0.00003	  -0.00003	  -0.00002
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            </tableData>
          </table>
       </product>
    </function>
    <function name="aero/c/CMLDRD">
    <description>ROLLING MOMENT DUE TO RUDDER DEFLECTION</description>
    <product>
          <property>fcs/yaw-pos-deg</property>
          <table>
            <independentVar lookup="row">aero/alpha-deg</independentVar>
            <independentVar lookup="column">aero/beta-deg</independentVar>
            <tableData>
                                -20	        -10	         -5	         -2	          0	          2	          5	         10	         20
                    -10	    0.00010	    0.00047	    0.00056	    0.00055	    0.00050	    0.00052	    0.00053	    0.00056	    0.00057
                      2	    0.00017	    0.00046	    0.00049	    0.00047	    0.00046	    0.00044	    0.00045	    0.00048	    0.00053
                      7	    0.00018	    0.00045	    0.00043	    0.00041	    0.00038	    0.00039	    0.00040	    0.00042	    0.00054
                     12	    0.00020	    0.00040	    0.00037	    0.00035	    0.00034	    0.00033	    0.00034	    0.00038	    0.00046
                     17	    0.00015	    0.00036	    0.00033	    0.00031	    0.00030	    0.00030	    0.00031	    0.00034	    0.00040
                     60	    0.00000	    0.00001	    0.00001	    0.00001	    0.00001	    0.00002	    0.00002	    0.00002	    0.00003
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            </tableData>
          </table>
       </product>
    </function>
    <function name="aero/c/CMLDSPL">
    <description>ROLLING MOMENT INCREMENT DUE TO SPOILERS LEFT</description>
    <product>
          <table>
            <independentVar lookup="row">aero/alpha-deg</independentVar>
            <independentVar lookup="column">fcs/speedbrake-left-deg</independentVar>
            <tableData>
                                  0	         20	         50
                    -10	    0.00000	  -0.03165	  -0.03285
                      2	    0.00000	  -0.04461	  -0.07673
                      7	    0.00000	  -0.04820	  -0.07966
                     12	    0.00000	  -0.04786	  -0.08379
                     17	    0.00000	  -0.01354	  -0.04752
                     60	    0.00000	  -0.00168	  -0.00330
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            </tableData>
          </table>
       </product>
    </function>
    <function name="aero/c/CMLDSPR">
    <description>ROLLING MOMENT INCREMENT DUE TO SPOILERS RIGHT</description>
    <product>
          <table>
            <independentVar lookup="row">aero/alpha-deg</independentVar>
            <independentVar lookup="column">fcs/speedbrake-right-deg</independentVar>
            <tableData>
                                  0	         20	         50
                    -10	    0.00000	    0.03165	    0.03285
                      2	    0.00000	    0.04461	    0.07673
                      7	    0.00000	    0.04820	    0.07966
                     12	    0.00000	    0.04786	    0.08379
                     17	    0.00000	    0.01354	    0.04752
                     60	    0.00000	    0.00168	    0.00330
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            </tableData>
          </table>
       </product>
    </function>
    <function name="aero/c/CMLP">
    <description>ROLL DAMPING DERIVATIVE</description>
    <product>
          <property>aero/pb</property>
          <table>
            <independentVar lookup="row">aero/alpha-deg</independentVar>
            <tableData>
                    -10		  -0.44887
                     -5		  -0.39562
                      2		  -0.38500
                      6		  -0.44861
                     10		  -0.35655
                     14		  -0.19091
                     18		  -0.01842
                     60		    0.03695
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            </tableData>
          </table>
       </product>
    </function>
    <function name="aero/c/CMLR">
    <description>ROLLING MOMENT DUE TO YAW RATE</description>
    <product>
          <property>aero/rb</property>
          <table>
            <independentVar lookup="row">aero/alpha-deg</independentVar>
            <tableData>
                    -10		    0.00089
                     -5		    0.05608
                      2		    0.11083
                      6		    0.16212
                     10		    0.21932
                     14		    0.10301
                     18		    0.07578
                     60		    0.11566
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            </tableData>
          </table>
       </product>
    </function>
    <function name="aero/c/CFYB">
    <description>BASE SIDEFORCE</description>
    <product>
          <table>
            <independentVar lookup="row">aero/alpha-deg</independentVar>
            <independentVar lookup="column">aero/beta-deg</independentVar>
            <independentVar lookup="table">fcs/pitch-pos-deg</independentVar>
              <tableData breakPoint="-17">
                              -20	       -10	        -5	        -2	         0	         2	         5	        10	        20
                    -10	    0.17506	    0.07779	    0.03659	    0.01402	    0.00000	  -0.01446	  -0.03659	  -0.07784	  -0.17491
                      2	    0.18361	    0.07880	    0.03594	    0.01334	    0.00000	  -0.01333	  -0.03594	  -0.07880	  -0.18401
                      7	    0.17840	    0.08382	    0.04028	    0.01415	    0.00000	  -0.01415	  -0.04028	  -0.08382	  -0.17839
                     12	    0.17160	    0.07972	    0.03777	    0.01390	    0.00000	  -0.01390	  -0.03778	  -0.07971	  -0.17159
                     17	    0.16615	    0.07722	    0.03499	    0.01236	    0.00000	  -0.01236	  -0.03499	  -0.07718	  -0.16613
                     60	    0.05570	    0.02047	    0.01028	    0.00414	    0.00000	  -0.00414	  -0.01028	  -0.02047	  -0.05569
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              </tableData>
              <tableData breakPoint="-15">
                              -20	       -10	        -5	        -2	         0	         2	         5	        10	        20
                    -10	    0.17392	    0.07725	    0.03586	    0.01378	    0.00000	  -0.01377	  -0.03587	  -0.07725	  -0.17392
                      2	    0.18405	    0.07919	    0.03774	    0.01402	    0.00000	  -0.01342	  -0.03612	  -0.07919	  -0.18405
                      7	    0.18538	    0.08361	    0.04014	    0.01425	    0.00000	  -0.01425	  -0.04014	  -0.08362	  -0.17913
                     12	    0.17187	    0.07954	    0.03773	    0.01396	    0.00000	  -0.01397	  -0.04005	  -0.07954	  -0.17186
                     17	    0.16581	    0.07693	    0.03496	    0.01235	    0.00000	  -0.01235	  -0.03496	  -0.07693	  -0.16581
                     60	    0.05537	    0.02035	    0.01023	    0.00412	    0.00000	  -0.00412	  -0.01023	  -0.02035	  -0.05545
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              </tableData>
              <tableData breakPoint="-10">
                              -20	       -10	        -5	        -2	         0	         2	         5	        10	        20
                    -10	    0.17237	    0.07636	    0.03532	    0.01344	    0.00000	  -0.01344	  -0.03533	  -0.07632	  -0.17224
                      2	    0.18403	    0.08022	    0.03666	    0.01368	    0.00000	  -0.01368	  -0.03679	  -0.08022	  -0.18403
                      7	    0.18097	    0.08304	    0.03981	    0.01452	    0.00000	  -0.01452	  -0.03981	  -0.08301	  -0.18031
                     12	    0.17244	    0.07492	    0.03783	    0.01411	    0.00000	  -0.01411	  -0.03783	  -0.07901	  -0.17244
                     17	    0.16489	    0.07623	    0.03483	    0.01232	    0.00000	  -0.01232	  -0.03485	  -0.07625	  -0.16489
                     60	    0.05488	    0.02008	    0.01013	    0.00407	    0.00000	  -0.00407	  -0.01013	  -0.02008	  -0.05488
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              </tableData>
              <tableData breakPoint="-5">
                              -20	       -10	        -5	        -2	         0	         2	         5	        10	        20
                    -10	    0.17322	    0.07756	    0.03708	    0.01361	    0.00000	  -0.01361	  -0.03584	  -0.07756	  -0.17322
                      2	    0.18379	    0.08122	    0.03724	    0.01401	    0.00000	  -0.01401	  -0.03724	  -0.08122	  -0.18396
                      7	    0.18270	    0.08229	    0.03943	    0.01480	    0.00000	  -0.01480	  -0.03943	  -0.08229	  -0.18269
                     12	    0.17287	    0.07841	    0.03782	    0.01424	    0.00000	  -0.01424	  -0.03782	  -0.07841	  -0.17287
                     17	    0.16367	    0.07545	    0.03467	    0.01227	    0.00000	  -0.01227	  -0.03468	  -0.07545	  -0.16369
                     60	    0.05436	    0.01983	    0.01003	    0.00406	    0.00000	  -0.00404	  -0.01003	  -0.01983	  -0.05436
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              </tableData>
              <tableData breakPoint="0">
                              -20	       -10	        -5	        -2	         0	         2	         5	        10	        20
                    -10	    0.17449	    0.07872	    0.03632	    0.01376	    0.00000	  -0.01376	  -0.03632	  -0.07873	  -0.17421
                      2	    0.18325	    0.08217	    0.03784	    0.01438	    0.00000	  -0.01438	  -0.03783	  -0.08216	  -0.18325
                      7	    0.18423	    0.08145	    0.03900	    0.01507	    0.00000	  -0.01507	  -0.03900	  -0.08146	  -0.18424
                     12	    0.17310	    0.07768	    0.03778	    0.01436	    0.00000	  -0.01436	  -0.03800	  -0.07768	  -0.17290
                     17	    0.16228	    0.07456	    0.03446	    0.01220	    0.00000	  -0.01221	  -0.03446	  -0.07457	  -0.16673
                     60	    0.05393	    0.02262	    0.00995	    0.00401	    0.00000	  -0.00401	  -0.00996	  -0.01963	  -0.05393
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              </tableData>
              <tableData breakPoint="5">
                              -20	       -10	        -5	        -2	         0	         2	         5	        10	        20
                    -10	    0.17553	    0.07980	    0.03675	    0.01391	    0.00000	  -0.01391	  -0.03676	  -0.07978	  -0.17552
                      2	    0.18249	    0.08305	    0.03843	    0.01481	    0.00000	  -0.01481	  -0.03843	  -0.08305	  -0.18249
                      7	    0.17847	    0.08052	    0.03856	    0.01535	    0.00000	  -0.01535	  -0.03859	  -0.08055	  -0.18562
                     12	    0.17313	    0.07689	    0.03769	    0.01446	    0.00000	  -0.01446	  -0.03768	  -0.07684	  -0.17313
                     17	    0.16143	    0.07393	    0.03427	    0.01212	    0.00000	  -0.01212	  -0.03427	  -0.07394	  -0.16143
                     60	    0.05358	    0.01946	    0.00855	    0.00399	    0.00000	  -0.00399	  -0.00989	  -0.01946	  -0.05358
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              </tableData>
              <tableData breakPoint="10">
                              -20	       -10	        -5	        -2	         0	         2	         5	        10	        20
                    -10	    0.17627	    0.08073	    0.03662	    0.01403	    0.00000	  -0.01397	  -0.03714	  -0.08073	  -0.17627
                      2	    0.18158	    0.08389	    0.03907	    0.01527	    0.00000	  -0.01527	  -0.03907	  -0.08389	  -0.18158
                      7	    0.18680	    0.07960	    0.03810	    0.01557	    0.00000	  -0.01557	  -0.03810	  -0.07961	  -0.18680
                     12	    0.17310	    0.07607	    0.03755	    0.01454	    0.00000	  -0.01454	  -0.03755	  -0.07607	  -0.16500
                     17	    0.16081	    0.07369	    0.03465	    0.01238	    0.00000	  -0.01238	  -0.03465	  -0.07369	  -0.16082
                     60	    0.05949	    0.01932	    0.00985	    0.00397	    0.00000	  -0.00397	  -0.00985	  -0.01927	  -0.05627
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              </tableData>
              <tableData breakPoint="15">
                              -20	       -10	        -5	        -2	         0	         2	         5	        10	        20
                    -10	    0.17734	    0.08047	    0.03748	    0.01414	    0.00000	  -0.01414	  -0.03750	  -0.08155	  -0.17680
                      2	    0.18057	    0.08458	    0.03966	    0.01574	    0.00000	  -0.01574	  -0.03966	  -0.08458	  -0.18057
                      7	    0.18767	    0.07868	    0.03760	    0.01582	    0.00000	  -0.01582	  -0.03760	  -0.07868	  -0.18767
                     12	    0.17299	    0.07531	    0.03750	    0.01466	    0.00000	  -0.01466	  -0.03749	  -0.07532	  -0.17297
                     17	    0.16068	    0.07327	    0.03446	    0.01226	    0.00000	  -0.01226	  -0.03456	  -0.07327	  -0.16068
                     60	    0.05320	    0.01928	    0.00983	    0.00396	    0.00000	  -0.00396	  -0.00982	  -0.01928	  -0.05320
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              </tableData>
              <tableData breakPoint="20">
                              -20	       -10	        -5	        -2	         0	         2	         5	        10	        20
                    -10	    0.17712	    0.08224	    0.03777	    0.01424	    0.00000	  -0.01424	  -0.03777	  -0.08224	  -0.17712
                      2	    0.17952	    0.08518	    0.04022	    0.01621	    0.00000	  -0.01621	  -0.04022	  -0.08517	  -0.17968
                      7	    0.18817	    0.07755	    0.03705	    0.01601	    0.00000	  -0.01601	  -0.03705	  -0.07755	  -0.18817
                     12	    0.17266	    0.07429	    0.03720	    0.01461	    0.00000	  -0.01461	  -0.03720	  -0.07432	  -0.17268
                     17	    0.16047	    0.07258	    0.03416	    0.01215	    0.00000	  -0.01215	  -0.03416	  -0.07725	  -0.16022
                     60	    0.05315	    0.01926	    0.00982	    0.00395	    0.00000	  -0.00396	  -0.00985	  -0.01926	  -0.05315
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              </tableData>
              <tableData breakPoint="25">
                              -20	       -10	        -5	        -2	         0	         2	         5	        10	        20
                    -10	    0.17727	    0.08281	    0.03804	    0.01432	    0.00000	  -0.01432	  -0.03926	  -0.08281	  -0.17701
                      2	    0.17827	    0.08551	    0.04066	    0.01665	    0.00000	  -0.01668	  -0.04067	  -0.08551	  -0.18331
                      7	    0.18835	    0.07619	    0.03617	    0.01594	    0.00000	  -0.01594	  -0.03617	  -0.07619	  -0.18822
                     12	    0.17218	    0.07338	    0.03692	    0.01458	    0.00000	  -0.01458	  -0.03692	  -0.07338	  -0.17218
                     17	    0.16028	    0.07189	    0.03400	    0.01211	    0.00000	  -0.01210	  -0.03400	  -0.07189	  -0.16028
                     60	    0.05310	    0.01924	    0.00983	    0.00394	    0.00000	  -0.00396	  -0.00983	  -0.01926	  -0.05318
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              </tableData>
              <tableData breakPoint="30">
                              -20	       -10	        -5	        -2	         0	         2	         5	        10	        20
                    -10	    0.17431	    0.08320	    0.03821	    0.01439	    0.00000	  -0.01439	  -0.03821	  -0.08325	  -0.17729
                      2	    0.17677	    0.08520	    0.04046	    0.01666	    0.00000	  -0.01666	  -0.04046	  -0.08521	  -0.17677
                      7	    0.18804	    0.07475	    0.03545	    0.01588	    0.00000	  -0.01547	  -0.03545	  -0.07479	  -0.18804
                     12	    0.17173	    0.07268	    0.03673	    0.01457	    0.00000	  -0.01457	  -0.03674	  -0.07268	  -0.17173
                     17	    0.16037	    0.07180	    0.03389	    0.01207	    0.00000	  -0.01207	  -0.03389	  -0.07184	  -0.16037
                     60	    0.05325	    0.01930	    0.00984	    0.00397	    0.00000	  -0.00397	  -0.00984	  -0.01930	  -0.05325
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              </tableData>
          </table>
       </product>
    </function>
    <function name="aero/c/CFYDSPL">
    <description>SIDEFORCE INCREMENT DUE TO SPOILERS LEFT</description>
    <product>
          <table>
            <independentVar lookup="row">aero/alpha-deg</independentVar>
            <independentVar lookup="column">fcs/speedbrake-left-deg</independentVar>
            <tableData>
                                  0	         20	         50
                    -10	    0.00000	    0.00397	  -0.00584
                      2	    0.00000	    0.00739	    0.01012
                      7	    0.00000	    0.00562	    0.00631
                     12	    0.00000	    0.00632	    0.00780
                     17	    0.00000	    0.01826	    0.02147
                     60	    0.00000	    0.00993	    0.02001
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            </tableData>
          </table>
       </product>
    </function>
    <function name="aero/c/CFYDSPR">
    <description>SIDEFORCE INCREMENT DUE TO SPOILERS RIGHT</description>
    <product>
          <table>
            <independentVar lookup="row">aero/alpha-deg</independentVar>
            <independentVar lookup="column">fcs/speedbrake-right-deg</independentVar>
            <tableData>
                                  0	         20	         50
                    -10	    0.00000	  -0.00397	    0.00584
                      2	    0.00000	  -0.00739	  -0.01012
                      7	    0.00000	  -0.00562	  -0.00631
                     12	    0.00000	  -0.00632	  -0.00780
                     17	    0.00000	  -0.01826	  -0.02147
                     60	    0.00000	  -0.00993	  -0.02001
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            </tableData>
          </table>
       </product>
    </function>
    <function name="aero/c/CFYP">
    <description>SIDE FORCE DUE TO ROLL RATE</description>
    <product>
          <property>aero/pb</property>
          <table>
            <independentVar lookup="row">aero/alpha-deg</independentVar>
            <tableData>
                    -10		  -0.45740
                     -5		  -0.31246
                      2		  -0.15993
                      6		  -0.07587
                     10		    0.00828
                     14		    0.03169
                     18		    0.01556
                     60		  -0.08004
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            </tableData>
          </table>
       </product>
    </function>
    <function name="aero/c/CFYR">
    <description>SIDE FORCE DUE TO YAW RATE</description>
    <product>
          <property>aero/rb</property>
          <table>
            <independentVar lookup="row">aero/alpha-deg</independentVar>
            <tableData>
                    -10		    0.52975
                     -5		    0.51658
                      2		    0.51874
                      6		    0.56378
                     10		    0.56791
                     14		    0.56079
                     18		    0.53051
                     60		    0.36588
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            </tableData>
          </table>
       </product>
    </function>
    <function name="aero/c/CYDADL">
    <description>SIDE FORCE DUE TO LEFT AILERON DEFLECTION</description>
    <product>
          <property>fcs/roll-pos-left-deg</property>
          <table>
            <independentVar lookup="row">aero/alpha-deg</independentVar>
            <independentVar lookup="column">aero/beta-deg</independentVar>
            <tableData>
                                -20	        -10	         -5	         -2	          0	          2	          5	         10	         20
                    -10	  -0.00036	  -0.00014	  -0.00012	  -0.00011	  -0.00011	  -0.00011	  -0.00010	  -0.00010	  -0.00018
                      2	  -0.00023	  -0.00014	  -0.00030	  -0.00031	  -0.00031	  -0.00031	  -0.00030	  -0.00027	  -0.00019
                      7	  -0.00023	  -0.00026	  -0.00030	  -0.00029	  -0.00030	  -0.00029	  -0.00029	  -0.00026	  -0.00041
                     12	  -0.00053	  -0.00034	  -0.00025	  -0.00030	  -0.00027	  -0.00027	  -0.00027	  -0.00025	  -0.00012
                     17	  -0.00036	  -0.00030	  -0.00036	  -0.00039	  -0.00041	  -0.00041	  -0.00042	  -0.00042	  -0.00037
                     60	  -0.00018	  -0.00018	  -0.00018	  -0.00018	  -0.00018	  -0.00018	  -0.00019	  -0.00019	  -0.00021
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            </tableData>
          </table>
       </product>
    </function>
    <function name="aero/c/CYDADR">
    <description>SIDE FORCE DUE TO RIGHT AILERON DEFLECTION</description>
    <product>
          <property>fcs/roll-pos-right-deg</property>
          <table>
            <independentVar lookup="row">aero/alpha-deg</independentVar>
            <independentVar lookup="column">aero/beta-deg</independentVar>
            <tableData>
                                -20	        -10	         -5	         -2	          0	          2	          5	         10	         20
                    -10	  -0.00036	  -0.00014	  -0.00012	  -0.00011	  -0.00011	  -0.00011	  -0.00010	  -0.00010	  -0.00018
                      2	  -0.00023	  -0.00014	  -0.00030	  -0.00031	  -0.00031	  -0.00031	  -0.00030	  -0.00027	  -0.00019
                      7	  -0.00023	  -0.00026	  -0.00030	  -0.00029	  -0.00030	  -0.00029	  -0.00029	  -0.00026	  -0.00041
                     12	  -0.00053	  -0.00034	  -0.00025	  -0.00030	  -0.00027	  -0.00027	  -0.00027	  -0.00025	  -0.00012
                     17	  -0.00036	  -0.00030	  -0.00036	  -0.00039	  -0.00041	  -0.00041	  -0.00042	  -0.00042	  -0.00037
                     60	  -0.00018	  -0.00018	  -0.00018	  -0.00018	  -0.00018	  -0.00018	  -0.00019	  -0.00019	  -0.00021
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            </tableData>
          </table>
       </product>
    </function>
    <function name="aero/c/CYDRD">
    <description>SIDE FORCE DUE TO RUDDER DEFLECTION</description>
    <product>
          <property>fcs/yaw-pos-deg</property>
          <table>
            <independentVar lookup="row">aero/alpha-deg</independentVar>
            <independentVar lookup="column">aero/beta-deg</independentVar>
            <tableData>
                                -20	        -10	         -5	         -2	          0	          2	          5	         10	         20
                    -10	    0.00179	    0.00392	    0.00436	    0.00424	    0.00404	    0.00410	    0.00417	    0.00442	    0.00462
                      2	    0.00201	    0.00385	    0.00391	    0.00377	    0.00376	    0.00359	    0.00367	    0.00397	    0.00441
                      7	    0.00212	    0.00386	    0.00372	    0.00367	    0.00352	    0.00356	    0.00358	    0.00378	    0.00451
                     12	    0.00222	    0.00362	    0.00357	    0.00350	    0.00330	    0.00338	    0.00348	    0.00359	    0.00405
                     17	    0.00203	    0.00322	    0.00314	    0.00286	    0.00269	    0.00278	    0.00307	    0.00324	    0.00361
                     60	    0.00003	    0.00010	    0.00011	    0.00016	    0.00017	    0.00018	    0.00020	    0.00022	    0.00032
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            </tableData>
          </table>
       </product>
    </function>
    <function name="aero/c/CMN1">
    <description>BASE YAWING MOMENT</description>
    <product>
          <table>
            <independentVar lookup="row">aero/alpha-deg</independentVar>
            <independentVar lookup="column">aero/beta-deg</independentVar>
            <independentVar lookup="table">fcs/pitch-pos-deg</independentVar>
              <tableData breakPoint="-17">
                              -20	       -10	        -5	        -2	         0	         2	         5	        10	        20
                    -10	  -0.04182	  -0.01792	  -0.00795	  -0.00287	    0.00000	    0.00310	    0.00795	    0.01795	    0.04175
                      2	  -0.03233	  -0.01091	  -0.00448	  -0.00200	    0.00000	    0.00200	    0.00448	    0.01091	    0.03249
                      7	  -0.03158	  -0.00946	  -0.00333	  -0.00116	    0.00000	    0.00116	    0.00333	    0.00946	    0.03158
                     12	  -0.02958	  -0.01047	  -0.00444	  -0.00174	    0.00000	    0.00174	    0.00444	    0.01046	    0.02958
                     17	  -0.03600	  -0.01576	  -0.00673	  -0.00248	    0.00000	    0.00248	    0.00673	    0.01574	    0.03599
                     60	  -0.02298	  -0.00885	  -0.00452	  -0.00181	    0.00000	    0.00181	    0.00452	    0.00885	    0.02298
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              </tableData>
              <tableData breakPoint="-15">
                              -20	       -10	        -5	        -2	         0	         2	         5	        10	        20
                    -10	  -0.04102	  -0.01739	  -0.00742	  -0.00270	    0.00000	    0.00270	    0.00743	    0.01739	    0.04102
                      2	  -0.03256	  -0.01094	  -0.00527	  -0.00224	    0.00000	    0.00193	    0.00444	    0.01094	    0.03256
                      7	  -0.03485	  -0.00949	  -0.00335	  -0.00116	    0.00000	    0.00116	    0.00335	    0.00949	    0.03160
                     12	  -0.02958	  -0.01054	  -0.00447	  -0.00176	    0.00000	    0.00176	    0.00547	    0.01054	    0.02958
                     17	  -0.03597	  -0.01575	  -0.00675	  -0.00250	    0.00000	    0.00250	    0.00675	    0.01575	    0.03597
                     60	  -0.02295	  -0.00886	  -0.00452	  -0.00182	    0.00000	    0.00182	    0.00452	    0.00886	    0.02299
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              </tableData>
              <tableData breakPoint="-10">
                              -20	       -10	        -5	        -2	         0	         2	         5	        10	        20
                    -10	  -0.03962	  -0.01627	  -0.00679	  -0.00238	    0.00000	    0.00238	    0.00680	    0.01625	    0.03956
                      2	  -0.03280	  -0.01108	  -0.00437	  -0.00178	    0.00000	    0.00178	    0.00443	    0.01108	    0.03280
                      7	  -0.03171	  -0.00963	  -0.00345	  -0.00116	    0.00000	    0.00116	    0.00345	    0.00962	    0.03150
                     12	  -0.02963	  -0.00892	  -0.00468	  -0.00183	    0.00000	    0.00183	    0.00468	    0.01075	    0.02963
                     17	  -0.03597	  -0.01582	  -0.00685	  -0.00254	    0.00000	    0.00254	    0.00685	    0.01582	    0.03597
                     60	  -0.02302	  -0.00888	  -0.00455	  -0.00182	    0.00000	    0.00182	    0.00455	    0.00888	    0.02302
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              </tableData>
              <tableData breakPoint="-5">
                              -20	       -10	        -5	        -2	         0	         2	         5	        10	        20
                    -10	  -0.03951	  -0.01634	  -0.00747	  -0.00238	    0.00000	    0.00238	    0.00680	    0.01634	    0.03951
                      2	  -0.03312	  -0.01129	  -0.00436	  -0.00167	    0.00000	    0.00167	    0.00436	    0.01129	    0.03318
                      7	  -0.03189	  -0.00981	  -0.00358	  -0.00117	    0.00000	    0.00117	    0.00358	    0.00981	    0.03189
                     12	  -0.02977	  -0.01104	  -0.00489	  -0.00191	    0.00000	    0.00191	    0.00489	    0.01104	    0.02977
                     17	  -0.03603	  -0.01595	  -0.00697	  -0.00258	    0.00000	    0.00258	    0.00697	    0.01595	    0.03604
                     60	  -0.02306	  -0.00891	  -0.00457	  -0.00185	    0.00000	    0.00183	    0.00457	    0.00891	    0.02306
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              </tableData>
              <tableData breakPoint="0">
                              -20	       -10	        -5	        -2	         0	         2	         5	        10	        20
                    -10	  -0.03979	  -0.01647	  -0.00682	  -0.00238	    0.00000	    0.00238	    0.00682	    0.01647	    0.03968
                      2	  -0.03347	  -0.01156	  -0.00442	  -0.00159	    0.00000	    0.00159	    0.00442	    0.01156	    0.03347
                      7	  -0.03214	  -0.01006	  -0.00375	  -0.00121	    0.00000	    0.00121	    0.00375	    0.01006	    0.03215
                     12	  -0.03000	  -0.01137	  -0.00513	  -0.00202	    0.00000	    0.00202	    0.00523	    0.01137	    0.02988
                     17	  -0.03619	  -0.01612	  -0.00711	  -0.00264	    0.00000	    0.00264	    0.00711	    0.01613	    0.03855
                     60	  -0.02311	  -0.01035	  -0.00460	  -0.00185	    0.00000	    0.00185	    0.00460	    0.00894	    0.02311
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              </tableData>
              <tableData breakPoint="5">
                              -20	       -10	        -5	        -2	         0	         2	         5	        10	        20
                    -10	  -0.04014	  -0.01665	  -0.00687	  -0.00240	    0.00000	    0.00240	    0.00688	    0.01664	    0.04014
                      2	  -0.03388	  -0.01191	  -0.00454	  -0.00157	    0.00000	    0.00157	    0.00454	    0.01191	    0.03388
                      7	  -0.02889	  -0.01036	  -0.00397	  -0.00127	    0.00000	    0.00127	    0.00398	    0.01037	    0.03251
                     12	  -0.03032	  -0.01176	  -0.00540	  -0.00214	    0.00000	    0.00214	    0.00540	    0.01175	    0.03032
                     17	  -0.03684	  -0.01657	  -0.00734	  -0.00271	    0.00000	    0.00271	    0.00734	    0.01657	    0.03684
                     60	  -0.02316	  -0.00897	  -0.00401	  -0.00186	    0.00000	    0.00186	    0.00463	    0.00897	    0.02316
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              </tableData>
              <tableData breakPoint="10">
                              -20	       -10	        -5	        -2	         0	         2	         5	        10	        20
                    -10	  -0.04053	  -0.01687	  -0.00678	  -0.00243	    0.00000	    0.00240	    0.00696	    0.01687	    0.04053
                      2	  -0.03437	  -0.01234	  -0.00473	  -0.00159	    0.00000	    0.00159	    0.00473	    0.01234	    0.03437
                      7	  -0.03297	  -0.01073	  -0.00421	  -0.00133	    0.00000	    0.00133	    0.00421	    0.01074	    0.03297
                     12	  -0.03078	  -0.01219	  -0.00568	  -0.00226	    0.00000	    0.00226	    0.00568	    0.01219	    0.02682
                     17	  -0.03764	  -0.01739	  -0.00808	  -0.00309	    0.00000	    0.00309	    0.00808	    0.01739	    0.03764
                     60	  -0.02619	  -0.00899	  -0.00465	  -0.00187	    0.00000	    0.00187	    0.00465	    0.00895	    0.02471
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              </tableData>
              <tableData breakPoint="15">
                              -20	       -10	        -5	        -2	         0	         2	         5	        10	        20
                    -10	  -0.04120	  -0.01685	  -0.00707	  -0.00248	    0.00000	    0.00248	    0.00708	    0.01713	    0.04096
                      2	  -0.03490	  -0.01279	  -0.00497	  -0.00165	    0.00000	    0.00165	    0.00497	    0.01279	    0.03490
                      7	  -0.03345	  -0.01114	  -0.00445	  -0.00142	    0.00000	    0.00142	    0.00445	    0.01114	    0.03345
                     12	  -0.03127	  -0.01275	  -0.00609	  -0.00247	    0.00000	    0.00247	    0.00609	    0.01275	    0.03126
                     17	  -0.03854	  -0.01805	  -0.00834	  -0.00314	    0.00000	    0.00314	    0.00839	    0.01805	    0.03855
                     60	  -0.02328	  -0.00904	  -0.00467	  -0.00188	    0.00000	    0.00188	    0.00467	    0.00904	    0.02328
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              </tableData>
              <tableData breakPoint="20">
                              -20	       -10	        -5	        -2	         0	         2	         5	        10	        20
                    -10	  -0.04141	  -0.01741	  -0.00719	  -0.00253	    0.00000	    0.00253	    0.00719	    0.01741	    0.04141
                      2	  -0.03546	  -0.01327	  -0.00525	  -0.00174	    0.00000	    0.00174	    0.00525	    0.01326	    0.03551
                      7	  -0.03383	  -0.01143	  -0.00467	  -0.00151	    0.00000	    0.00151	    0.00467	    0.01143	    0.03383
                     12	  -0.03160	  -0.01311	  -0.00636	  -0.00255	    0.00000	    0.00255	    0.00636	    0.01312	    0.03161
                     17	  -0.03924	  -0.01819	  -0.00838	  -0.00316	    0.00000	    0.00316	    0.00838	    0.02041	    0.03915
                     60	  -0.02333	  -0.00907	  -0.00469	  -0.00189	    0.00000	    0.00189	    0.00472	    0.00907	    0.02333
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              </tableData>
              <tableData breakPoint="25">
                              -20	       -10	        -5	        -2	         0	         2	         5	        10	        20
                    -10	  -0.04186	  -0.01769	  -0.00734	  -0.00259	    0.00000	    0.00259	    0.00802	    0.01769	    0.04174
                      2	  -0.03585	  -0.01364	  -0.00550	  -0.00185	    0.00000	    0.00186	    0.00550	    0.01364	    0.03851
                      7	  -0.03398	  -0.01152	  -0.00468	  -0.00147	    0.00000	    0.00147	    0.00468	    0.01152	    0.03398
                     12	  -0.03179	  -0.01335	  -0.00646	  -0.00259	    0.00000	    0.00259	    0.00646	    0.01335	    0.03179
                     17	  -0.03968	  -0.01816	  -0.00843	  -0.00318	    0.00000	    0.00318	    0.00843	    0.01816	    0.03968
                     60	  -0.02336	  -0.00910	  -0.00471	  -0.00189	    0.00000	    0.00190	    0.00471	    0.00910	    0.02339
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              </tableData>
              <tableData breakPoint="30">
                              -20	       -10	        -5	        -2	         0	         2	         5	        10	        20
                    -10	  -0.04053	  -0.01794	  -0.00746	  -0.00265	    0.00000	    0.00265	    0.00746	    0.01796	    0.04227
                      2	  -0.03593	  -0.01363	  -0.00540	  -0.00174	    0.00000	    0.00174	    0.00540	    0.01364	    0.03593
                      7	  -0.03396	  -0.01141	  -0.00465	  -0.00142	    0.00000	    0.00126	    0.00465	    0.01143	    0.03396
                     12	  -0.03192	  -0.01344	  -0.00655	  -0.00262	    0.00000	    0.00262	    0.00655	    0.01344	    0.03192
                     17	  -0.04002	  -0.01834	  -0.00847	  -0.00320	    0.00000	    0.00320	    0.00847	    0.01837	    0.04002
                     60	  -0.02344	  -0.00913	  -0.00472	  -0.00190	    0.00000	    0.00190	    0.00472	    0.00913	    0.02344
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              </tableData>
          </table>
       </product>
    </function>
    <function name="aero/c/CMNBETADOT">
    <description>YAW MOMENT DERIVATIVE FOR BETADOT</description>
    <product>
          <property>aero/betadot-rad_sec</property>
          <table>
            <independentVar lookup="row">aero/alpha-deg</independentVar>
            <tableData>
                    -10		    0.08199
                     -5		    0.05867
                      2		    0.06294
                      6		    0.04796
                     10		    0.04156
                     14		    0.08274
                     18		    0.07132
                     60		    0.03391
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            </tableData>
          </table>
       </product>
    </function>
    <function name="aero/c/CMNDADL">
    <description>YAWING MOMENT DUE TO LEFT AILERON DEFLECTION</description>
    <product>
          <property>fcs/roll-pos-left-deg</property>
          <table>
            <independentVar lookup="row">aero/alpha-deg</independentVar>
            <independentVar lookup="column">aero/beta-deg</independentVar>
            <tableData>
                                -20	        -10	         -5	         -2	          0	          2	          5	         10	         20
                    -10	  -0.00021	  -0.00008	  -0.00006	  -0.00006	  -0.00006	  -0.00005	  -0.00004	  -0.00003	  -0.00003
                      2	    0.00000	    0.00010	    0.00005	    0.00006	    0.00006	    0.00007	    0.00009	    0.00012	    0.00017
                      7	    0.00006	    0.00012	    0.00013	    0.00016	    0.00016	    0.00018	    0.00020	    0.00023	    0.00017
                     12	  -0.00002	    0.00017	    0.00025	    0.00024	    0.00025	    0.00024	    0.00023	    0.00024	    0.00030
                     17	    0.00013	    0.00016	    0.00013	    0.00011	    0.00010	    0.00009	    0.00008	    0.00008	    0.00011
                     60	   0.00000	  -0.00001	  -0.00001	  -0.00001	  -0.00001	  -0.00001	  -0.00001	  -0.00001	  -0.00001
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            </tableData>
          </table>
       </product>
    </function>
    <function name="aero/c/CMNDADR">
    <description>YAWING MOMENT DUE TO RIGHT AILERON DEFLECTION</description>
    <product>
          <property>fcs/roll-pos-right-deg</property>
          <table>
            <independentVar lookup="row">aero/alpha-deg</independentVar>
            <independentVar lookup="column">aero/beta-deg</independentVar>
            <tableData>
                                -20	        -10	         -5	         -2	          0	          2	          5	         10	         20
                    -10	  -0.00021	  -0.00008	  -0.00006	  -0.00006	  -0.00006	  -0.00005	  -0.00004	  -0.00003	  -0.00003
                      2	    0.00000	    0.00010	    0.00005	    0.00006	    0.00006	    0.00007	    0.00009	    0.00012	    0.00017
                      7	    0.00006	    0.00012	    0.00013	    0.00016	    0.00016	    0.00018	    0.00020	    0.00023	    0.00017
                     12	  -0.00002	    0.00017	    0.00025	    0.00024	    0.00025	    0.00024	    0.00023	    0.00024	    0.00030
                     17	    0.00013	    0.00016	    0.00013	    0.00011	    0.00010	    0.00009	    0.00008	    0.00008	    0.00011
                     60	   0.00000	  -0.00001	  -0.00001	  -0.00001	  -0.00001	  -0.00001	  -0.00001	  -0.00001	  -0.00001
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            </tableData>
          </table>
       </product>
    </function>
    <function name="aero/c/CMNDRD">
    <description>YAWING MOMENT DUE TO RUDDER DEFLECTION</description>
    <product>
          <property>fcs/yaw-pos-deg</property>
          <table>
            <independentVar lookup="row">aero/alpha-deg</independentVar>
            <independentVar lookup="column">aero/beta-deg</independentVar>
            <tableData>
                                -20	        -10	         -5	         -2	          0	          2	          5	         10	         20
                    -10	  -0.00091	  -0.00195	  -0.00215	  -0.00208	  -0.00197	  -0.00200	  -0.00202	  -0.00214	  -0.00221
                      2	  -0.00105	  -0.00193	  -0.00197	  -0.00192	  -0.00186	  -0.00182	  -0.00184	  -0.00195	  -0.00213
                      7	  -0.00110	  -0.00193	  -0.00183	  -0.00177	  -0.00170	  -0.00171	  -0.00174	  -0.00184	  -0.00220
                     12	  -0.00112	  -0.00177	  -0.00168	  -0.00164	  -0.00162	  -0.00159	  -0.00161	  -0.00171	  -0.00194
                     17	  -0.00103	  -0.00158	  -0.00152	  -0.00148	  -0.00145	  -0.00144	  -0.00147	  -0.00155	  -0.00175
                     60	  -0.00002	  -0.00005	  -0.00005	  -0.00008	  -0.00008	  -0.00009	  -0.00010	  -0.00011	  -0.00016
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            </tableData>
          </table>
       </product>
    </function>
    <function name="aero/c/CMNDSPL">
    <description>YAWING MOMENT INCREMENT DUE TO SPOILERS LEFT</description>
    <product>
          <table>
            <independentVar lookup="row">aero/alpha-deg</independentVar>
            <independentVar lookup="column">fcs/speedbrake-left-deg</independentVar>
            <tableData>
                                  0	         20	         50
                    -10	    0.00000	    0.00060	  -0.00259
                      2	    0.00000	  -0.00527	  -0.01132
                      7	    0.00000	  -0.00905	  -0.01757
                     12	    0.00000	  -0.01140	  -0.02237
                     17	    0.00000	  -0.00322	  -0.01480
                     60	    0.00000	    0.00134	    0.00252
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            </tableData>
          </table>
       </product>
    </function>
    <function name="aero/c/CMNDSPR">
    <description>YAWING MOMENT INCREMENT DUE TO SPOILERS RIGHT</description>
    <product>
          <table>
            <independentVar lookup="row">aero/alpha-deg</independentVar>
            <independentVar lookup="column">fcs/speedbrake-right-deg</independentVar>
            <tableData>
                                  0	         20	         50
                    -10	    0.00000	  -0.00060	    0.00259
                      2	    0.00000	    0.00527	    0.01132
                      7	    0.00000	    0.00905	    0.01757
                     12	    0.00000	    0.01140	    0.02237
                     17	    0.00000	    0.00322	    0.01480
                     60	    0.00000	  -0.00134	  -0.00252
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            </tableData>
          </table>
       </product>
    </function>
    <function name="aero/c/CMNP">
    <description>YAW MOMENT DUE TO ROLL RATE</description>
    <product>
          <property>aero/pb</property>
          <table>
            <independentVar lookup="row">aero/alpha-deg</independentVar>
            <tableData>
                    -10		    0.20707
                     -5		    0.12371
                      2		    0.02036
                      6		  -0.05491
                     10		  -0.10383
                     14		  -0.10396
                     18		  -0.07694
                     60		    0.00621
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            </tableData>
          </table>
       </product>
    </function>
    <function name="aero/c/CMNR">
    <description>YAW DAMPING DERIVATIVE</description>
    <product>
          <property>aero/rb</property>
          <table>
            <independentVar lookup="row">aero/alpha-deg</independentVar>
            <tableData>
                    -10		  -0.22428
                     -5		  -0.20869
                      2		  -0.20179
                      6		  -0.20822
                     10		  -0.19593
                     14		  -0.22246
                     18		  -0.23090
                     60		  -0.12070
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            </tableData>
          </table>
       </product>
    </function>
    <function name="aero/coefficients/CDRAG">
      <sum>
          <property>aero/c/CFXB</property>
          <property>aero/c/CFXDADL</property>
          <property>aero/c/CFXDADR</property>
          <property>aero/c/CFXDRD</property>
          <property>aero/c/CFXDSM</property>
          <property>aero/c/CFXDFM</property>
          <property>aero/c/CFXDSPL</property>
          <property>aero/c/CFXDSPR</property>
          <property>aero/c/CFXGEAR</property>
       </sum>
    </function>
  <axis name="DRAG">
    <function name="aero/force/DRAG">
    <product>
          <property>aero/qbar-psf</property>
          <property>metrics/Sw-sqft</property>
          <property>aero/coefficients/CDRAG</property>
       </product>
    </function>
  </axis>
    <function name="aero/coefficients/CROLL">
      <sum>
          <property>aero/c/CML1</property>
          <property>aero/c/CMLDADL</property>
          <property>aero/c/CMLDADR</property>
          <property>aero/c/CMLDRD</property>
          <property>aero/c/CMLDSPL</property>
          <property>aero/c/CMLDSPR</property>
          <property>aero/c/CMLBETADOT</property>
          <property>aero/c/CMLP</property>
          <property>aero/c/CMLR</property>
       </sum>
    </function>
  <axis name="ROLL">
    <function name="aero/force/ROLL">
    <product>
          <property>aero/qbar-psf</property>
          <property>metrics/Sw-sqft</property>
          <property>metrics/bw-ft</property>
          <property>aero/coefficients/CROLL</property>
       </product>
    </function>
  </axis>
    <function name="aero/coefficients/CSIDE">
      <sum>
          <property>aero/c/CYDADL</property>
          <property>aero/c/CYDADR</property>
          <property>aero/c/CYDRD</property>
          <property>aero/c/CFYDSPL</property>
          <property>aero/c/CFYDSPR</property>
          <property>aero/c/CFYB</property>
          <property>aero/c/CFYP</property>
          <property>aero/c/CFYR</property>
       </sum>
    </function>
  <axis name="SIDE">
    <function name="aero/force/SIDE">
    <product>
          <property>aero/qbar-psf</property>
          <property>metrics/Sw-sqft</property>
          <property>aero/coefficients/CSIDE</property>
       </product>
    </function>
  </axis>
    <function name="aero/coefficients/CLIFT">
      <sum>
          <property>aero/c/CFZDADL</property>
          <property>aero/c/CFZDADR</property>
          <property>aero/c/CFZDRD</property>
          <property>aero/c/CFZDSM</property>
          <property>aero/c/CFZDFM</property>
          <property>aero/c/CFZDSPL</property>
          <property>aero/c/CFZDSPR</property>
          <property>aero/c/CFZGEAR</property>
          <property>aero/c/CFZB</property>
          <property>aero/c/CFZDDS</property>
       </sum>
    </function>
  <axis name="LIFT">
    <function name="aero/force/LIFT">
    <product>
          <property>aero/qbar-psf</property>
          <property>metrics/Sw-sqft</property>
          <property>aero/coefficients/CLIFT</property>
       </product>
    </function>
  </axis>
    <function name="aero/coefficients/CPITCH">
      <sum>
          <property>aero/c/CMMDADL</property>
          <property>aero/c/CMMDADR</property>
          <property>aero/c/CMMDRD</property>
          <property>aero/c/CMMDSM</property>
          <property>aero/c/CMMDFM</property>
          <property>aero/c/CMMDSPL</property>
          <property>aero/c/CMMDSPR</property>
          <property>aero/c/CMMGEAR</property>
          <property>aero/c/CMM1</property>
          <property>aero/c/CMMDDS</property>
          <property>aero/c/CMMALPHADOT</property>
          <property>aero/c/CMMBETADOT</property>
          <property>aero/c/CMMQ</property>
       </sum>
    </function>
  <axis name="PITCH">
    <function name="aero/force/PITCH">
    <product>
          <property>aero/qbar-psf</property>
          <property>metrics/Sw-sqft</property>
          <property>metrics/cbarw-ft</property>
          <property>aero/coefficients/CPITCH</property>
       </product>
    </function>
  </axis>
    <function name="aero/coefficients/CYAW">
      <sum>
          <property>aero/c/CMNDADL</property>
          <property>aero/c/CMNDADR</property>
          <property>aero/c/CMNDRD</property>
          <property>aero/c/CMNDSPL</property>
          <property>aero/c/CMNDSPR</property>
          <property>aero/c/CMN1</property>
          <property>aero/c/CMNBETADOT</property>
          <property>aero/c/CMNR</property>
          <property>aero/c/CMNP</property>
       </sum>
    </function>
  <axis name="YAW">
    <function name="aero/force/YAW">
    <product>
          <property>aero/qbar-psf</property>
          <property>metrics/Sw-sqft</property>
          <property>metrics/bw-ft</property>
          <property>aero/coefficients/CYAW</property>
       </product>
    </function>
  </axis>
</aerodynamics>
